OpenVSP model (file version 5), 4 components.
Geometry view with OpenVSP parameter names; values to 6 digits, angles in degrees, lengths in the model's unit.
Overall bounding box: X_Min=-0.03 X_Len=0.699818 Y_Min=-0.5 Y_Len=1 Z_Min=-0.035 Z_Len=0.0530081

Wing "WingGeom"
  location (X Y Z) 0 0 0, rotation 0 0 0
  symmetric about XZ
  bounding box size 0.3 1 0.0360163
  totals: TotalSpan=1 TotalProjectedSpan=1 TotalChord=0.3 TotalArea=0.3 TotalAR=3.33333 MAC=0.3
  root: chord 0.3, twist 0, NACA 4-series Camber=0 CamberLoc=0.2 ThickChord=0.12
  sections:
    n  Span  Root_Chord  Tip_Chord  Area  Sweep  Sweep_Location  Dihedral  Twist  Twist_Location  tip airfoil
    1  0.5   0.3         0.3        0.15  0      0               0         0      0.25            NACA 4-series Camber=0 CamberLoc=0.2 ThickChord=0.1

Wing "HTail", child of "WingGeom"
  location (X Y Z) 0.5 0 0, rotation 0 0 0
  symmetric about XZ
  bounding box size 0.15 0.5 0.0150087
  totals: TotalSpan=0.5 TotalProjectedSpan=0.5 TotalChord=0.15 TotalArea=0.075 TotalAR=3.33333 MAC=0.15
  root: chord 0.15, twist 0, NACA 4-series Camber=0 CamberLoc=0.2 ThickChord=0.1
  sections:
    n  Span  Root_Chord  Tip_Chord  Area    Sweep  Sweep_Location  Dihedral  Twist  Twist_Location  tip airfoil
    1  0.25  0.15        0.15       0.0375  0      0               0         0      0.25            as above

Custom "Fuselage"
  location (X Y Z) -0.03 0 -0.02, rotation 0 0 0
  bounding box size 0.699818 0.03 0.03
  Design: Height=0.03 Length=0.699818 SquareFlag=0 Width=0.03
  custom script Box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

Mesh "MeshGeom"
  location (X Y Z) 0 0 0, rotation 0 0 0
