OpenVSP model (file version 5), 27 components.
Geometry view with OpenVSP parameter names; values to 6 digits, angles in degrees, lengths in the model's unit.
Overall bounding box: X_Min=0 X_Len=36.2 Y_Min=-33.2902 Y_Len=66.5803 Z_Min=-10.5338 Z_Len=16.4481

Fuselage "FuselageGeom"
  location (X Y Z) 0 0 0, rotation 0 0 0
  bounding box size 36.2 5.75063 6.33862
  Design: Length=36.2
  cross sections:
    n  XLocPercent  YLocPercent  ZLocPercent  shape
    0  0            0            -0.071       point
    1  0.212707     0            -0.057       ellipse Ellipse_Height=4.13636 Ellipse_Width=3.7
    2  0.911602     0            -0.013       ellipse Ellipse_Height=2.5 Ellipse_Width=3.7
    3  0.994475     0            0            circle Circle_Diameter=0.497045
    4  1            0            0            point

Wing "WingGeom", child of "FuselageGeom"
  location (X Y Z) 15.4802 -0.872872 -1.25174, rotation 0 0 10.5; relative location 15.4 0 -1.25174, rotation 0 0 10.5
  symmetric about XZ
  bounding box size 5.30964 66.5803 0.901241
  totals: TotalSpan=66 TotalProjectedSpan=66 TotalChord=3.9 TotalArea=257.4 TotalAR=16.9231
  root: chord 5.4, twist 0, airfoil file "GW 25"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 BaseThickChord=0.156607 ThickChord=0.156607
  sections:
    n  Span  Root_Chord  Tip_Chord  Area   Sweep  Sweep_Location  Dihedral  Twist     Twist_Location  tip airfoil
    1  33    5.4         2.4        128.7  12     0               0         -0.09091  0.25            airfoil file "MH 114  13.02%"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 BaseThickChord=0.130435 ThickChord=0.130435

Conformal "ConformalGeom", child of "FuselageGeom"
  location (X Y Z) 0 0 0, rotation 0 0 0
  bounding box size 35.9679 5.51633 6.11846
  Design: ChordTrimFlag=0 ChordTrimMax=0.9 ChordTrimMin=0.1 Offset=0.1 UTrimFlag=0 UTrimMax=0.9 UTrimMin=0.1 V1TrimBegin=0.3 V1TrimEnd=1 V1TrimFlag=0 V2TrimBegin=0.25 V2TrimEnd=0.75 V2TrimFlag=0

Wing "ELEVATOR"
  location (X Y Z) 27.136 -0.660197 -1.65886, rotation 31.722 -9.783 20
  symmetric about XZ
  bounding box size 3.82903 20.6689 7.59874
  totals: TotalSpan=22.4 TotalProjectedSpan=22.4 TotalChord=3.05 TotalArea=68.32 TotalAR=7.34426
  root: chord 4.1, twist 0, airfoil file "NACA 0012-34"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 BaseThickChord=0.120004 ThickChord=0.120004
  sections:
    n  Span  Root_Chord  Tip_Chord  Area   Sweep  Sweep_Location  Dihedral  Twist  Twist_Location  tip airfoil
    1  11.2  4.1         2          34.16  29     0               0         0      0.25            as above

Propeller "PROP_TAIL", child of "ELEVATOR"
  location (X Y Z) 33.6 0 0, rotation 0 0 0
  bounding box size 0.457212 7.79678 8.14994
  Design: Diameter=9.2 NumBlade=3 Beta34=20 UseBeta34Flag=1 Feather=0 Rotate=290 Precone=0 ReverseFlag=1 FoldAngle=0 PropMode=0 AF=151.538 CLi=0.538798 Chord=0.177656 Solidity=0.169649 ConstructXoC=0.5 FeatherAxisXoC=0.5 FeatherOffsetXoC=0
  cross sections:
    n  RadiusFrac  shape
    0  0.2         ellipse Ellipse_Height=0.184 Ellipse_Width=0.368
    1  0.4         NACA 16-series Chord=0.76475 IdealCl=0.7 ThickChord=0.144074
    2  1           NACA 16-series Chord=0.598 IdealCl=0.2 ThickChord=0.03
  Chord along r/R (cubic Bezier): 0.2: 0.08, 0.333333: 0.15, 0.466667: 0.2, 0.6: 0.2, 0.716667: 0.2, 0.833333: 0.2, 0.95: 0.2, 0.966667: 0.2, 0.983333: 0.2, 1: 0.13
  Twist along r/R (PCHIP): 0.2: 46.75, 0.75: 20, 1: 13
  Thick along r/R (cubic Bezier): 0.2: 0.5, 0.233333: 0.3, 0.266667: 0.225, 0.3: 0.2, 0.4: 0.125, 0.5: 0.115, 0.6: 0.1, 0.733333: 0.075, 0.866667: 0.055, 1: 0.03
  CLI along r/R (cubic Bezier): 0.2: 0, 0.266667: 0.7, 0.333333: 0.7, 0.4: 0.7, 0.466667: 0.7, 0.533333: 0.7, 0.6: 0.7, 0.733333: 0.7, 0.866667: 0.7, 1: 0.2

Propeller "PROP_L_IN", child of "PROP_TAIL"
  location (X Y Z) 15.0362 -8.69565 -1.1, rotation -10 0 0
  bounding box size 0.447272 7.62723 7.97277
  Design: Diameter=9 NumBlade=3 Beta34=20 UseBeta34Flag=1 Feather=0 Rotate=0 Precone=0 ReverseFlag=0 FoldAngle=0 PropMode=0 AF=151.538 CLi=0.538798 Chord=0.177656 Solidity=0.169649 ConstructXoC=0.5 FeatherAxisXoC=0.5 FeatherOffsetXoC=0
  cross sections:
    n  RadiusFrac  shape
    0  0.2         ellipse Ellipse_Height=0.18 Ellipse_Width=0.36
    1  0.4         NACA 16-series Chord=0.748125 IdealCl=0.7 ThickChord=0.144074
    2  1           NACA 16-series Chord=0.585 IdealCl=0.2 ThickChord=0.03
  blade curves as in "PROP_TAIL"

Wing "Vertical Tail"
  location (X Y Z) 26.9 0 -1.73896, rotation -90 0 0
  bounding box size 4.1 0.492056 3.5
  totals: TotalSpan=3.5 TotalProjectedSpan=3.5 TotalChord=3.05 TotalArea=10.675 TotalAR=1.14754
  root: chord 4.1, twist 0, airfoil file "NACA 0012-34"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 BaseThickChord=0.120004 ThickChord=0.120004
  sections:
    n  Span  Root_Chord  Tip_Chord  Area    Sweep  Sweep_Location  Dihedral  Twist  Twist_Location  tip airfoil
    1  3.5   4.1         2          10.675  29     0               0         0      0.25            as above

Fuselage "Air Intake"
  location (X Y Z) 25 0 0.869565, rotation 0 0 0
  bounding box size 8.21894 2.4 2.4
  Design: Length=7.92727
  cross sections:
    n  XLocPercent  YLocPercent  ZLocPercent  shape
    0  0            0            0            point
    1  0            0            0            circle Circle_Diameter=1.75
    2  0.228261     0            0            circle Circle_Diameter=2.2
    3  0.547023     0            0            circle Circle_Diameter=2.4
    4  1            0            -0.0217391   point

Propeller "PROP_L_OUT"
  location (X Y Z) 15.1449 -18.4783 -1.1, rotation -10 0 0
  bounding box size 0.447272 7.62723 7.97277
  Design: Diameter=9 NumBlade=3 Beta34=20 UseBeta34Flag=1 Feather=0 Rotate=0 Precone=0 ReverseFlag=0 FoldAngle=0 PropMode=0 AF=151.538 CLi=0.538798 Chord=0.177656 Solidity=0.169649 ConstructXoC=0.5 FeatherAxisXoC=0.5 FeatherOffsetXoC=0
  cross sections:
    n  RadiusFrac  shape
    0  0.2         ellipse Ellipse_Height=0.18 Ellipse_Width=0.36
    1  0.4         NACA 16-series Chord=0.748125 IdealCl=0.7 ThickChord=0.144074
    2  1           NACA 16-series Chord=0.585 IdealCl=0.2 ThickChord=0.03
  blade curves as in "PROP_TAIL"

Custom "CONE_L_OUT", child of "PROP_L_OUT"
  location (X Y Z) 13.7 -18.5 -1.19048, rotation 0 0 0
  bounding box size 4.50088 1.2 1.24
  Design: AftCenter=0.3 AftHeight=0.3 AftMult=3 AftWidth=0.1 Diameter=1.2 Length=4.50077 NoseCenter=-0.2 NoseMult=1.5
  custom script TransportFuse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

Propeller "PROP_R_OUT"
  location (X Y Z) 14.9928 17.1377 -1.1, rotation -10 0 0
  bounding box size 0.447272 7.62723 7.97277
  Design: Diameter=9 NumBlade=3 Beta34=20 UseBeta34Flag=1 Feather=0 Rotate=0 Precone=0 ReverseFlag=0 FoldAngle=0 PropMode=0 AF=151.538 CLi=0.538798 Chord=0.177656 Solidity=0.169649 ConstructXoC=0.5 FeatherAxisXoC=0.5 FeatherOffsetXoC=0
  cross sections:
    n  RadiusFrac  shape
    0  0.2         ellipse Ellipse_Height=0.18 Ellipse_Width=0.36
    1  0.4         NACA 16-series Chord=0.748125 IdealCl=0.7 ThickChord=0.144074
    2  1           NACA 16-series Chord=0.585 IdealCl=0.2 ThickChord=0.03
  blade curves as in "PROP_TAIL"

Propeller "PROP_R_IN"
  location (X Y Z) 14.8841 6.92029 -1.1, rotation -10 0 0
  bounding box size 0.447272 7.62723 7.97277
  Design: Diameter=9 NumBlade=3 Beta34=20 UseBeta34Flag=1 Feather=0 Rotate=0 Precone=0 ReverseFlag=0 FoldAngle=0 PropMode=0 AF=151.538 CLi=0.538798 Chord=0.177656 Solidity=0.169649 ConstructXoC=0.5 FeatherAxisXoC=0.5 FeatherOffsetXoC=0
  cross sections:
    n  RadiusFrac  shape
    0  0.2         ellipse Ellipse_Height=0.18 Ellipse_Width=0.36
    1  0.4         NACA 16-series Chord=0.748125 IdealCl=0.7 ThickChord=0.144074
    2  1           NACA 16-series Chord=0.585 IdealCl=0.2 ThickChord=0.03
  blade curves as in "PROP_TAIL"

Custom "CONE_L_IN"
  location (X Y Z) 13.5 -8.5 -1.19048, rotation 0 0 0
  bounding box size 4.50088 1.2 1.24
  Design: AftCenter=0.3 AftHeight=0.3 AftMult=3 AftWidth=0.1 Diameter=1.2 Length=4.50077 NoseCenter=-0.2 NoseMult=1.5
  custom script TransportFuse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

Custom "CONE_R_IN"
  location (X Y Z) 13.5 7 -1.19048, rotation 0 0 0
  bounding box size 4.50088 1.2 1.24
  Design: AftCenter=0.3 AftHeight=0.3 AftMult=3 AftWidth=0.1 Diameter=1.2 Length=4.50077 NoseCenter=-0.2 NoseMult=1.5
  custom script TransportFuse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

Custom "CONE_R_OUT"
  location (X Y Z) 13.5 17.1 -1.19048, rotation 0 0 0
  bounding box size 4.50088 1.2 1.24
  Design: AftCenter=0.3 AftHeight=0.3 AftMult=3 AftWidth=0.1 Diameter=1.2 Length=4.50077 NoseCenter=-0.2 NoseMult=1.5
  custom script TransportFuse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

Custom "FRONT_SHOCK_STRUT"
  location (X Y Z) 5.2381 0 -8.80952, rotation 0.238095 -45 -0.47619
  bounding box size 7.36832 0.50904 7.48141
  Design: AftCenter=0.3 AftHeight=0.3 AftMult=3 AftWidth=0.1 Diameter=0.4 Length=10 NoseCenter=-0.2 NoseMult=1.5
  custom script TransportFuse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

Custom "LEFT_SHOCK_STRUT"
  location (X Y Z) 26.6667 -5 -8.33333, rotation -30 -120 0
  bounding box size 5.44129 4.6931 7.81191
  Design: AftCenter=0.3 AftHeight=0.3 AftMult=3 AftWidth=0.1 Diameter=0.4 Length=10 NoseCenter=-0.2 NoseMult=1.5
  custom script TransportFuse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

Custom "RIGHT_SHOCK_STRUT"
  location (X Y Z) 26.6667 5 -8.33333, rotation 30 -120 0
  bounding box size 5.44129 4.6931 7.81191
  Design: AftCenter=0.3 AftHeight=0.3 AftMult=3 AftWidth=0.1 Diameter=0.4 Length=10 NoseCenter=-0.2 NoseMult=1.5
  custom script TransportFuse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

Ellipsoid "FRONT WHEEL"
  location (X Y Z) 3.80952 0 -8.8, rotation 90 0.952381 0.47619
  bounding box size 4.0067 2.1219 3.50077
  Design: A_Radius=1.98972 B_Radius=1.74132 C_Radius=1.04271

Ellipsoid "REAR_ WHEEL_R"
  location (X Y Z) 24.0476 4.52381 -7.38095, rotation 90 0.952381 0.47619
  bounding box size 4.00726 2.12249 3.50014
  Design: A_Radius=1.99 B_Radius=1.741 C_Radius=1.043

Ellipsoid "REAR_ WHEEL_L"
  location (X Y Z) 24 -4.52381 -7.38095, rotation 90 0.952381 0.47619
  bounding box size 4.00726 2.12249 3.50014
  Design: A_Radius=1.99 B_Radius=1.741 C_Radius=1.043

Ellipsoid "RIM_F WHEEL_1"
  location (X Y Z) 5.22 -0.862 -8.8, rotation 90 0.952381 0.47619
  bounding box size 1.19058 0.630518 1.04025
  Design: A_Radius=0.591242 B_Radius=0.51743 C_Radius=0.309839

Ellipsoid "RIM_F WHEEL_2"
  location (X Y Z) 5.2381 0.85 -8.8, rotation 90 0.952381 0.47619
  bounding box size 1.19058 0.630518 1.04025
  Design: A_Radius=0.591242 B_Radius=0.51743 C_Radius=0.309839

Ellipsoid "DOTF_ WHEEL_3"
  location (X Y Z) 25.4762 3.65 -7.4, rotation 90 0.952381 0.47619
  bounding box size 1.19058 0.630518 1.04025
  Design: A_Radius=0.591242 B_Radius=0.51743 C_Radius=0.309839

Ellipsoid "DOTF_ WHEEL_4"
  location (X Y Z) 25.45 5.4 -7.37143, rotation 90 0.952381 0.47619
  bounding box size 1.19058 0.630518 1.04025
  Design: A_Radius=0.591242 B_Radius=0.51743 C_Radius=0.309839

Ellipsoid "DOTF_ WHEEL_5"
  location (X Y Z) 25.43 -3.55 -7.37143, rotation 90 0.952381 0.47619
  bounding box size 1.19058 0.630518 1.04025
  Design: A_Radius=0.591242 B_Radius=0.51743 C_Radius=0.309839

Ellipsoid "DOTF_ WHEEL_6"
  location (X Y Z) 25.45 -5.38 -7.37143, rotation 90 0.952381 0.47619
  bounding box size 1.19058 0.630518 1.04025
  Design: A_Radius=0.591242 B_Radius=0.51743 C_Radius=0.309839
