OpenVSP model (file version 5), 78 components.
Geometry view with OpenVSP parameter names; values to 6 digits, angles in degrees, lengths in the model's unit.
Overall bounding box: X_Min=-0.329667 X_Len=1.87958 Y_Min=-1.29219 Y_Len=2.58437 Z_Min=-0.33622 Z_Len=0.697213

Wing "WingGeom"
  location (X Y Z) 0 0 0, rotation 0 0 0
  symmetric about XZ
  bounding box size 0.399994 2.58424 0.0745617
  mass: Density=0 Shell_Flag=1 Mass_Area=0.1 Mass_Prior=0
  totals: TotalSpan=2.58143 TotalProjectedSpan=2.57945 TotalChord=0.28891 TotalArea=0.734092 TotalAR=9.06364 RelativeTwistFlag=1
  root: chord 0.399994, twist 0, NACA 4-series Camber=0 CamberLoc=0.2 ThickChord=0.1
  sections:
    n  Span      Root_Chord  Tip_Chord  Area       Sweep  Sweep_Location  Dihedral  Twist  Twist_Location  tip airfoil
    1  0.075     0.399994    0.399994   0.0299995  0      0               0         0      0.25            as above
    2  0.915715  0.399994    0.239996   0.293024   0      1               2.66667   2      0.25            as above
    3  0.3       0.239996    0.0534849  0.0440222  0      1               0         0      0.25            as above
  structure "Longarina": Skin

Wing "fixacao_asa", child of "WingGeom"
  location (X Y Z) 0.0499993 0.069 -0.0299995, rotation 0 0 0
  symmetric about XZ
  bounding box size 0.1 0.146 0.1
  mass: Density=150 Shell_Flag=0 Mass_Area=1 Mass_Prior=0
  totals: TotalSpan=0.008 TotalProjectedSpan=0.008 TotalChord=0.1 TotalArea=0.0008 TotalAR=0.08
  root: chord 0.1, twist 0, rounded rectangle RoundRectXSec_Radius=0.001 RoundedRect_Height=0.1 RoundedRect_Width=0.1
  sections:
    n  Span   Root_Chord  Tip_Chord  Area    Sweep  Sweep_Location  Dihedral  Twist  Twist_Location  tip airfoil
    1  0.004  0.1         0.1        0.0004  0      0               0         0      0.25            as above

Conformal "Longarina", child of "WingGeom"
  location (X Y Z) 0 0 0, rotation 0 0 0
  symmetric about XZ
  bounding box size 0.283534 2.58437 0.0745394
  mass: Density=0 Shell_Flag=1 Mass_Area=5.28 Mass_Prior=0
  Design: ChordTrimFlag=1 ChordTrimMax=0.8 ChordTrimMin=0.7 Offset=0 UTrimFlag=0 UTrimMax=0.9999 UTrimMin=0 V1TrimBegin=0.654386 V1TrimEnd=0.345614 V1TrimFlag=1 V2TrimBegin=0.394713 V2TrimEnd=0.605287 V2TrimFlag=1

Conformal "nervura_raiz", child of "WingGeom"
  location (X Y Z) 0 0 0, rotation 0 0 0
  symmetric about XZ
  bounding box size 0.399994 0.1485 0.0400226
  mass: Density=240 Shell_Flag=0 Mass_Area=0.28 Mass_Prior=0
  Design: ChordTrimFlag=1 ChordTrimMax=1 ChordTrimMin=0 Offset=0 UTrimFlag=1 UTrimMax=0.33 UTrimMin=0.3212 V1TrimBegin=1 V1TrimEnd=0 V1TrimFlag=1 V2TrimBegin=0.5 V2TrimEnd=0.5 V2TrimFlag=1

Conformal "nervura_kink", child of "WingGeom"
  location (X Y Z) 0 0 0, rotation 0 0 0
  symmetric about XZ
  bounding box size 0.238748 1.98545 0.02469
  mass: Density=240 Shell_Flag=0 Mass_Area=0.28 Mass_Prior=0
  Design: ChordTrimFlag=1 ChordTrimMax=1 ChordTrimMin=0 Offset=0 UTrimFlag=1 UTrimMax=0.67 UTrimMin=0.668647 V1TrimBegin=1 V1TrimEnd=0 V1TrimFlag=1 V2TrimBegin=0.5 V2TrimEnd=0.5 V2TrimFlag=1

Conformal "nervura_tip", child of "WingGeom"
  location (X Y Z) 0 0 0, rotation 0 0 0
  symmetric about XZ
  bounding box size 0.0543763 2.57927 0.00562325
  mass: Density=240 Shell_Flag=0 Mass_Area=0.28 Mass_Prior=0
  Design: ChordTrimFlag=1 ChordTrimMax=1 ChordTrimMin=0 Offset=0 UTrimFlag=1 UTrimMax=0.9999 UTrimMin=0.998351 V1TrimBegin=1 V1TrimEnd=0 V1TrimFlag=1 V2TrimBegin=0.5 V2TrimEnd=0.5 V2TrimFlag=1

Conformal "nervura_1", child of "WingGeom"
  location (X Y Z) 0 0 0, rotation 0 0 0
  symmetric about XZ
  bounding box size 0.383067 0.36496 0.0387386
  mass: Density=240 Shell_Flag=0 Mass_Area=0.28 Mass_Prior=0
  Design: ChordTrimFlag=1 ChordTrimMax=1 ChordTrimMin=0 Offset=0 UTrimFlag=1 UTrimMax=0.3725 UTrimMin=0.368568 V1TrimBegin=1 V1TrimEnd=0 V1TrimFlag=1 V2TrimBegin=0.5 V2TrimEnd=0.5 V2TrimFlag=1

Conformal "nervura_2", child of "WingGeom"
  location (X Y Z) 0 0 0, rotation 0 0 0
  symmetric about XZ
  bounding box size 0.362072 0.598214 0.0365563
  mass: Density=240 Shell_Flag=0 Mass_Area=0.28 Mass_Prior=0
  Design: ChordTrimFlag=1 ChordTrimMax=1 ChordTrimMin=0 Offset=0 UTrimFlag=1 UTrimMax=0.415 UTrimMin=0.412269 V1TrimBegin=1 V1TrimEnd=0 V1TrimFlag=1 V2TrimBegin=0.5 V2TrimEnd=0.5 V2TrimFlag=1

Conformal "nervura_3", child of "WingGeom"
  location (X Y Z) 0 0 0, rotation 0 0 0
  symmetric about XZ
  bounding box size 0.341393 0.831469 0.0344789
  mass: Density=240 Shell_Flag=0 Mass_Area=0.28 Mass_Prior=0
  Design: ChordTrimFlag=1 ChordTrimMax=1 ChordTrimMin=0 Offset=0 UTrimFlag=1 UTrimMax=0.4575 UTrimMin=0.455313 V1TrimBegin=1 V1TrimEnd=0 V1TrimFlag=1 V2TrimBegin=0.5 V2TrimEnd=0.5 V2TrimFlag=1

Conformal "nervura_4", child of "WingGeom"
  location (X Y Z) 0 0 0, rotation 0 0 0
  symmetric about XZ
  bounding box size 0.320826 1.06472 0.0324483
  mass: Density=240 Shell_Flag=0 Mass_Area=0.28 Mass_Prior=0
  Design: ChordTrimFlag=1 ChordTrimMax=1 ChordTrimMin=0 Offset=0 UTrimFlag=1 UTrimMax=0.5 UTrimMin=0.498123 V1TrimBegin=1 V1TrimEnd=0 V1TrimFlag=1 V2TrimBegin=0.5 V2TrimEnd=0.5 V2TrimFlag=1

Conformal "nervura_5", child of "WingGeom"
  location (X Y Z) 0 0 0, rotation 0 0 0
  symmetric about XZ
  bounding box size 0.300312 1.29798 0.0304723
  mass: Density=240 Shell_Flag=0 Mass_Area=0.28 Mass_Prior=0
  Design: ChordTrimFlag=1 ChordTrimMax=1 ChordTrimMin=0 Offset=0 UTrimFlag=1 UTrimMax=0.5425 UTrimMin=0.540824 V1TrimBegin=1 V1TrimEnd=0 V1TrimFlag=1 V2TrimBegin=0.5 V2TrimEnd=0.5 V2TrimFlag=1

Conformal "nervura_6", child of "WingGeom"
  location (X Y Z) 0 0 0, rotation 0 0 0
  symmetric about XZ
  bounding box size 0.279827 1.53123 0.0285278
  mass: Density=240 Shell_Flag=0 Mass_Area=0.28 Mass_Prior=0
  Design: ChordTrimFlag=1 ChordTrimMax=1 ChordTrimMin=0 Offset=0 UTrimFlag=1 UTrimMax=0.585 UTrimMin=0.583464 V1TrimBegin=1 V1TrimEnd=0 V1TrimFlag=1 V2TrimBegin=0.5 V2TrimEnd=0.5 V2TrimFlag=1

Conformal "nervura_7", child of "WingGeom"
  location (X Y Z) 0 0 0, rotation 0 0 0
  symmetric about XZ
  bounding box size 0.25936 1.76449 0.0266657
  mass: Density=240 Shell_Flag=0 Mass_Area=0.28 Mass_Prior=0
  Design: ChordTrimFlag=1 ChordTrimMax=1 ChordTrimMin=0 Offset=0 UTrimFlag=1 UTrimMax=0.6275 UTrimMin=0.626068 V1TrimBegin=1 V1TrimEnd=0 V1TrimFlag=1 V2TrimBegin=0.5 V2TrimEnd=0.5 V2TrimFlag=1

Conformal "nervura_8_airfoil", child of "WingGeom"
  location (X Y Z) 0 0 0, rotation 0 0 0
  symmetric about XZ
  bounding box size 0.135702 2.08442 0.0215127
  mass: Density=240 Shell_Flag=0 Mass_Area=0.28 Mass_Prior=0
  Design: ChordTrimFlag=1 ChordTrimMax=1 ChordTrimMin=0.35 Offset=0 UTrimFlag=1 UTrimMax=0.724983 UTrimMin=0.72359 V1TrimBegin=0.826391 V1TrimEnd=0.173609 V1TrimFlag=1 V2TrimBegin=0.5 V2TrimEnd=0.5 V2TrimFlag=1

Conformal "nervura_9_airfoil", child of "WingGeom"
  location (X Y Z) 0 0 0, rotation 0 0 0
  symmetric about XZ
  bounding box size 0.115705 2.18339 0.0183351
  mass: Density=240 Shell_Flag=0 Mass_Area=0.28 Mass_Prior=0
  Design: ChordTrimFlag=1 ChordTrimMax=1 ChordTrimMin=0.35 Offset=0 UTrimFlag=1 UTrimMax=0.779967 UTrimMin=0.778536 V1TrimBegin=0.826391 V1TrimEnd=0.173609 V1TrimFlag=1 V2TrimBegin=0.5 V2TrimEnd=0.5 V2TrimFlag=1

Conformal "nervura_10_airfoil", child of "WingGeom"
  location (X Y Z) 0 0 0, rotation 0 0 0
  symmetric about XZ
  bounding box size 0.0957068 2.28236 0.0151574
  mass: Density=240 Shell_Flag=0 Mass_Area=0.28 Mass_Prior=0
  Design: ChordTrimFlag=1 ChordTrimMax=1 ChordTrimMin=0.35 Offset=0 UTrimFlag=1 UTrimMax=0.83495 UTrimMin=0.833486 V1TrimBegin=0.826391 V1TrimEnd=0.173609 V1TrimFlag=1 V2TrimBegin=0.5 V2TrimEnd=0.5 V2TrimFlag=1

Conformal "nervura_11_airfoil", child of "WingGeom"
  location (X Y Z) 0 0 0, rotation 0 0 0
  symmetric about XZ
  bounding box size 0.0757069 2.38133 0.0119795
  mass: Density=240 Shell_Flag=0 Mass_Area=0.28 Mass_Prior=0
  Design: ChordTrimFlag=1 ChordTrimMax=1 ChordTrimMin=0.35 Offset=0 UTrimFlag=1 UTrimMax=0.889933 UTrimMin=0.888439 V1TrimBegin=0.826391 V1TrimEnd=0.173609 V1TrimFlag=1 V2TrimBegin=0.5 V2TrimEnd=0.5 V2TrimFlag=1

Conformal "nervura_12_airfoil", child of "WingGeom"
  location (X Y Z) 0 0 0, rotation 0 0 0
  symmetric about XZ
  bounding box size 0.0557055 2.4803 0.00880142
  mass: Density=240 Shell_Flag=0 Mass_Area=0.28 Mass_Prior=0
  Design: ChordTrimFlag=1 ChordTrimMax=1 ChordTrimMin=0.35 Offset=0 UTrimFlag=1 UTrimMax=0.944917 UTrimMin=0.943393 V1TrimBegin=0.826391 V1TrimEnd=0.173609 V1TrimFlag=1 V2TrimBegin=0.5 V2TrimEnd=0.5 V2TrimFlag=1

Conformal "aileron", child of "WingGeom"
  location (X Y Z) 0 0 0, rotation 0 0 0
  symmetric about XZ
  bounding box size 0.0834256 2.57909 0.0161719
  mass: Density=140 Shell_Flag=0 Mass_Area=0.28 Mass_Prior=0
  Design: ChordTrimFlag=1 ChordTrimMax=0.35 ChordTrimMin=0 Offset=0 UTrimFlag=1 UTrimMax=0.9998 UTrimMin=0.671 V1TrimBegin=1 V1TrimEnd=0 V1TrimFlag=1 V2TrimBegin=0.173609 V2TrimEnd=0.826391 V2TrimFlag=1

Conformal "placa_servo", child of "WingGeom"
  location (X Y Z) 0 0 0, rotation 0 0 0
  symmetric about XZ
  bounding box size 0.0468256 2.27972 0.0021177
  mass: Density=240 Shell_Flag=0 Mass_Area=0.28 Mass_Prior=0
  Design: ChordTrimFlag=0 ChordTrimMax=0.6 ChordTrimMin=0.351 Offset=0 UTrimFlag=1 UTrimMax=0.833486 UTrimMin=0.779967 V1TrimBegin=0.4 V1TrimEnd=0.2 V1TrimFlag=1 V2TrimBegin=0.296524 V2TrimEnd=0.71 V2TrimFlag=1

Conformal "servo", child of "WingGeom"
  location (X Y Z) 0 0 0, rotation 0 0 0
  symmetric about XZ
  bounding box size 0.0186493 2.2428 0.0151534
  mass: Density=1800 Shell_Flag=0 Mass_Area=0.28 Mass_Prior=0
  Design: ChordTrimFlag=0 ChordTrimMax=0.6 ChordTrimMin=0.351 Offset=0 UTrimFlag=1 UTrimMax=0.812976 UTrimMin=0.800476 V1TrimBegin=0.78 V1TrimEnd=0.22 V1TrimFlag=1 V2TrimBegin=0.265 V2TrimEnd=0.733739 V2TrimFlag=1

Conformal "reforco_TE", child of "WingGeom"
  location (X Y Z) 0 0 0, rotation 0 0 0
  symmetric about XZ
  bounding box size 0.0799988 1.98545 0.0515023
  mass: Density=0 Shell_Flag=1 Mass_Area=0.14 Mass_Prior=0
  Design: ChordTrimFlag=1 ChordTrimMax=0.2 ChordTrimMin=0 Offset=0 UTrimFlag=1 UTrimMax=0.67 UTrimMin=0 V1TrimBegin=1 V1TrimEnd=0 V1TrimFlag=1 V2TrimBegin=0.0997114 V2TrimEnd=0.900289 V2TrimFlag=1

Conformal "reforco_LE", child of "WingGeom"
  location (X Y Z) 0 0 0, rotation 0 0 0
  symmetric about XZ
  bounding box size 0.351876 2.57927 0.068825
  mass: Density=0 Shell_Flag=1 Mass_Area=0.14 Mass_Prior=0
  Design: ChordTrimFlag=1 ChordTrimMax=1 ChordTrimMin=0.9 Offset=0 UTrimFlag=1 UTrimMax=0.9999 UTrimMin=0 V1TrimBegin=0.556 V1TrimEnd=0.444 V1TrimFlag=1 V2TrimBegin=0.5 V2TrimEnd=0.5 V2TrimFlag=1

Stack "Fuselagem", child of "WingGeom"
  location (X Y Z) -0.2 0 -0.075, rotation 0 0 0
  bounding box size 1.6 0.15 0.25
  cross sections:
    n  XDelta  YDelta  ZDelta  shape
    0  0       0       0       rounded rectangle RoundRectXSec_Radius=0 RoundedRect_Height=0.1 RoundedRect_Width=0.07
    1  0.2     0       0       rounded rectangle RoundRectXSec_Radius=0.005 RoundedRect_Height=0.15 RoundedRect_Width=0.15
    2  0.4     0       0       as above
    3  0.3     0       0.055   rounded rectangle RoundRectXSec_Radius=0.001 RoundedRect_Height=0.04 RoundedRect_Width=0.04
    4  0.7     0       0.1     as above

Wing "trem_pouso", child of "Fuselagem"
  location (X Y Z) 0.2 0 -0.1525, rotation 0 0 0; relative location 0.4 0 -0.0775, rotation 0 0 0
  symmetric about XZ
  bounding box size 0.05 0.405 0.16384
  mass: Density=1760 Shell_Flag=0 Mass_Area=1 Mass_Prior=0
  totals: TotalSpan=0.585422 TotalProjectedSpan=0.4 TotalChord=0.045 TotalArea=0.0279456 TotalAR=5.72541
  root: chord 0.05, twist 0, rounded rectangle RoundRectXSec_Radius=0.0025 RoundedRect_Height=0.005 RoundedRect_Width=0.05
  sections:
    n  Span       Root_Chord  Tip_Chord  Area        Sweep  Sweep_Location  Dihedral  Twist  Twist_Location  tip airfoil
    1  0.0828427  0.05        0.05       0.00414214  0      0               0         0      0.25            as above
    2  0.165685   0.05        0.05       0.00828427  0      0               -45       0      0.25            as above
    3  0.0441828  0.05        0.02       0.0015464   0      0.5             -90       0      0.25            rounded rectangle RoundRectXSec_Radius=0.0025 RoundedRect_Height=0.005 RoundedRect_Width=0.02

Wing "roda", child of "trem_pouso"
  location (X Y Z) 0.2 0.205 -0.299591, rotation 0 0 0; relative location 0 0.205 -0.147091, rotation 0 0 0
  symmetric about XZ
  bounding box size 0.06 0.434 0.06
  mass: Density=1000 Shell_Flag=0 Mass_Area=1 Mass_Prior=0
  totals: TotalSpan=0.024 TotalProjectedSpan=0.024 TotalChord=0.06 TotalArea=0.00144 TotalAR=0.4
  root: chord 0.06, twist 0, circle Circle_Diameter=0.06
  sections:
    n  Span   Root_Chord  Tip_Chord  Area     Sweep  Sweep_Location  Dihedral  Twist  Twist_Location  tip airfoil
    1  0.012  0.06        0.06       0.00072  0      0               0         0      0.25            as above

Stack "Montante_base", child of "Fuselagem"
  location (X Y Z) -0.21 0 -0.075, rotation 0 0 0; relative location -0.01 0 0, rotation 0 0 0
  bounding box size 0.01 0.064 0.064
  mass: Density=1470 Shell_Flag=0 Mass_Area=1 Mass_Prior=0
  cross sections:
    n  XDelta  YDelta  ZDelta  shape
    0  0       0       0       circle Circle_Diameter=0.064
    1  0.01    0       0       as above

Stack "Montante_base_cut", child of "Montante_base"
  location (X Y Z) -0.21 0 -0.075, rotation 0 0 0; relative location 0 0 0, rotation 0 0 0
  bounding box size 0.01 0.038 0.038
  mass: Density=1470 Shell_Flag=0 Mass_Area=1 Mass_Prior=0
  negative volume
  cross sections:
    n  XDelta  YDelta  ZDelta  shape
    0  0       0       0       circle Circle_Diameter=0.038
    1  0.01    0       0       as above

Stack "hastes_suporte", child of "Montante_base"
  location (X Y Z) -0.21 -0.0255 -0.075, rotation 0 0 0; relative location 0 -0.0255 0, rotation 0 0 0
  symmetric about XZ
  bounding box size 0.0981667 0.064 0.01
  mass: Density=1470 Shell_Flag=0 Mass_Area=1 Mass_Prior=0
  cross sections:
    n  XDelta  YDelta  ZDelta  shape
    0  0       0       0       ellipse Ellipse_Height=0.01 Ellipse_Width=0.013
    1  -0.062  0       0       as above

Stack "Motor_1", child of "Montante_base"
  location (X Y Z) -0.23 0 -0.075, rotation 0 0 0; relative location -0.02 0 0, rotation 0 0 0
  bounding box size 0.112167 0.0272 0.0272
  mass: Density=2987 Shell_Flag=0 Mass_Area=1 Mass_Prior=0
  cross sections:
    n  XDelta  YDelta  ZDelta  shape
    0  0       0       0       circle Circle_Diameter=0.0219
    1  -0.05   0       0       as above
    2  -0.005  0       0       circle Circle_Diameter=0.025
    3  -0.005  0       0       circle Circle_Diameter=0.0272
    4  -0.005  0       0       circle Circle_Diameter=0.008
    5  -0.026  0       0       as above

Wing "fixacao_motor", child of "Motor_1"
  location (X Y Z) -0.23 0.01 -0.07, rotation -180 0 -180; relative location 0 0.01 0.005, rotation 0 180 0
  symmetric about XZ
  bounding box size 0.063 0.06 0.00630366
  mass: Density=2987 Shell_Flag=0 Mass_Area=1 Mass_Prior=0
  totals: TotalSpan=0.04 TotalProjectedSpan=0.04 TotalChord=0.0495 TotalArea=0.00198 TotalAR=0.808081
  root: chord 0.063, twist 0, NACA 4-series Camber=0 CamberLoc=0.2 ThickChord=0.1
  sections:
    n  Span  Root_Chord  Tip_Chord  Area     Sweep  Sweep_Location  Dihedral  Twist  Twist_Location  tip airfoil
    1  0.02  0.063       0.036      0.00099  0      0               0         0      0               as above

Wing "regulagem_motor", child of "Motor_1"
  location (X Y Z) -0.282 0 -0.065, rotation -90 0 140; relative location -0.052 0 0.01, rotation 90 180 -40
  bounding box size 0.0266446 0.018 0.0268911
  mass: Density=2987 Shell_Flag=0 Mass_Area=1 Mass_Prior=0
  totals: TotalSpan=0.02 TotalProjectedSpan=0.02 TotalChord=0.018 TotalArea=0.00036 TotalAR=1.11111
  root: chord 0.018, twist 0, circle Circle_Diameter=0.018
  sections:
    n  Span  Root_Chord  Tip_Chord  Area     Sweep  Sweep_Location  Dihedral  Twist  Twist_Location  tip airfoil
    1  0.02  0.018       0.018      0.00036  0      1               0         0      0               as above

Wing "pistao_motor", child of "Motor_1"
  location (X Y Z) -0.27 0 -0.065, rotation 90 0 0; relative location -0.04 0 0.01, rotation 90 0 0
  bounding box size 0.036 0.017 0.05
  mass: Density=2987 Shell_Flag=0 Mass_Area=1 Mass_Prior=0
  totals: TotalSpan=0.05 TotalProjectedSpan=0.05 TotalChord=0.036 TotalArea=0.0018 TotalAR=1.38889
  root: chord 0.036, twist 0, rounded rectangle RoundRectXSec_Radius=0.001 RoundedRect_Height=0.017 RoundedRect_Width=0.036
  sections:
    n  Span  Root_Chord  Tip_Chord  Area    Sweep  Sweep_Location  Dihedral  Twist  Twist_Location  tip airfoil
    1  0.05  0.036       0.036      0.0018  0      1               0         0      0               as above

Wing "pistao_motor", child of "Motor_1"
  location (X Y Z) -0.267 0.008 -0.035, rotation 0 0 0; relative location -0.037 0.008 0.04, rotation 0 0 0
  bounding box size 0.03 0.034 0.01
  mass: Density=2987 Shell_Flag=0 Mass_Area=1 Mass_Prior=0
  totals: TotalSpan=0.034 TotalProjectedSpan=0.034 TotalChord=0.03 TotalArea=0.00102 TotalAR=1.13333
  root: chord 0.03, twist 0, rounded rectangle RoundRectXSec_Radius=0.001 RoundedRect_Height=0.01 RoundedRect_Width=0.03
  sections:
    n  Span   Root_Chord  Tip_Chord  Area     Sweep  Sweep_Location  Dihedral  Twist  Twist_Location  tip airfoil
    1  0.034  0.03        0.03       0.00102  0      1               0         0      0               as above

Stack "carburador_motor", child of "Motor_1"
  location (X Y Z) -0.29 0.062 -0.035, rotation 0 0 0; relative location -0.06 0.062 0.04, rotation 0 0 0
  bounding box size 0.156 0.04 0.04
  mass: Density=2987 Shell_Flag=0 Mass_Area=1 Mass_Prior=0
  cross sections:
    n  XDelta  YDelta  ZDelta  shape
    0  0       0       0       circle Circle_Diameter=0.04
    1  0.116   0       0       as above

Propeller "helice", child of "Motor_1"
  location (X Y Z) -0.315 0 -0.075, rotation -45 0 0; relative location -0.085 0 0, rotation -45 0 0
  bounding box size 0.0162846 0.249931 0.249931
  mass: Density=1000 Shell_Flag=0 Mass_Area=1 Mass_Prior=0
  Design: Diameter=0.33 NumBlade=2 Beta34=20 UseBeta34Flag=1 Feather=0 Rotate=0 Precone=0 ReverseFlag=0 FoldAngle=0 PropMode=0 AF=152.376 CLi=0.540965 Chord=0.175039 Solidity=0.111433 ConstructXoC=0.5 FeatherAxisXoC=0.5 FeatherOffsetXoC=0
  cross sections:
    n  RadiusFrac  shape
    0  0.0806061   ellipse Ellipse_Height=0.0066 Ellipse_Width=0.0132
    1  0.4         NACA 16-series Chord=0.0296128 IdealCl=0.7 ThickChord=0.144074
    2  1           NACA 16-series Chord=0.02145 IdealCl=0.2 ThickChord=0.03
  Chord along r/R (cubic Bezier): 0.0806061: 0.08, 0.253737: 0.15, 0.426869: 0.2, 0.6: 0.2, 0.716667: 0.2, 0.833333: 0.2, 0.95: 0.2, 0.966667: 0.2, 0.983333: 0.2, 1: 0.13
  Twist along r/R (PCHIP): 0.0806061: 46.75, 0.75: 20, 1: 13
  Thick along r/R (cubic Bezier): 0.0806061: 0.5, 0.153737: 0.3, 0.226869: 0.225, 0.3: 0.2, 0.4: 0.125, 0.5: 0.115, 0.6: 0.1, 0.733333: 0.075, 0.866667: 0.055, 1: 0.03
  CLI along r/R (cubic Bezier): 0.0806061: 0, 0.187071: 0.7, 0.293535: 0.7, 0.4: 0.7, 0.466667: 0.7, 0.533333: 0.7, 0.6: 0.7, 0.733333: 0.7, 0.866667: 0.7, 1: 0.2

Stack "centro_helice", child of "helice"
  location (X Y Z) -0.315 0 -0.075, rotation -45 0 0; relative location 0 0 0, rotation 0 0 0
  bounding box size 0.0126667 0.0299941 0.0299941
  mass: Density=1000 Shell_Flag=0 Mass_Area=1 Mass_Prior=0
  cross sections:
    n  XDelta  YDelta  ZDelta  shape
    0  0       0       0       circle Circle_Diameter=0.03
    1  -0.008  0       0       as above

Wing "EmpHorizontal", child of "Fuselagem"
  location (X Y Z) 1.35 0 0.08, rotation 0 0 0
  symmetric about XZ
  bounding box size 0.199883 1.00119 0.0206708
  mass: Density=0 Shell_Flag=1 Mass_Area=0.1 Mass_Prior=0
  totals: TotalSpan=0.981176 TotalProjectedSpan=0.981176 TotalChord=0.2 TotalArea=0.196235 TotalAR=4.90588 RelativeTwistFlag=1
  root: chord 0.2, twist 2, NACA 4-series Camber=0 CamberLoc=0.2 ThickChord=0.1
  sections:
    n  Span      Root_Chord  Tip_Chord  Area       Sweep  Sweep_Location  Dihedral  Twist  Twist_Location  tip airfoil
    1  0.02      0.2         0.2        0.004      0      0               0         0      0.25            as above
    2  0.235294  0.2         0.2        0.0470588  0      1               0         0      0.25            as above
    3  0.235294  0.2         0.2        0.0470588  0      1               0         0      0.25            as above

Conformal "Longarina", child of "EmpHorizontal"
  location (X Y Z) 1.35 0 0.08, rotation 0 0 0; relative location 0 0 0, rotation 0 0 0
  symmetric about XZ
  bounding box size 0.0206028 1.00223 0.0202874
  mass: Density=0 Shell_Flag=1 Mass_Area=5.28 Mass_Prior=0
  Design: ChordTrimFlag=1 ChordTrimMax=0.8 ChordTrimMin=0.7 Offset=0 UTrimFlag=0 UTrimMax=0.9999 UTrimMin=0 V1TrimBegin=0.654386 V1TrimEnd=0.345614 V1TrimFlag=1 V2TrimBegin=0.394713 V2TrimEnd=0.605287 V2TrimFlag=1

Conformal "nervura_raiz", child of "EmpHorizontal"
  location (X Y Z) 1.35 0 0.08, rotation 0 0 0; relative location 0 0 0, rotation 0 0 0
  symmetric about XZ
  bounding box size 0.130129 0.0396 0.0206708
  mass: Density=240 Shell_Flag=0 Mass_Area=0.28 Mass_Prior=0
  Design: ChordTrimFlag=1 ChordTrimMax=1 ChordTrimMin=0.35 Offset=0 UTrimFlag=1 UTrimMax=0.33 UTrimMin=0.3212 V1TrimBegin=0.826391 V1TrimEnd=0.173609 V1TrimFlag=1 V2TrimBegin=0.5 V2TrimEnd=0.5 V2TrimFlag=1

Conformal "nervura_kink", child of "EmpHorizontal"
  location (X Y Z) 1.35 0 0.08, rotation 0 0 0; relative location 0 0 0, rotation 0 0 0
  symmetric about XZ
  bounding box size 0.130129 0.515294 0.0206708
  mass: Density=240 Shell_Flag=0 Mass_Area=0.28 Mass_Prior=0
  Design: ChordTrimFlag=1 ChordTrimMax=1 ChordTrimMin=0.35 Offset=0 UTrimFlag=1 UTrimMax=0.67 UTrimMin=0.668015 V1TrimBegin=0.826391 V1TrimEnd=0.173609 V1TrimFlag=1 V2TrimBegin=0.5 V2TrimEnd=0.5 V2TrimFlag=1

Conformal "nervura_tip", child of "EmpHorizontal"
  location (X Y Z) 1.35 0 0.08, rotation 0 0 0; relative location 0 0 0, rotation 0 0 0
  symmetric about XZ
  bounding box size 0.130129 0.981035 0.0206708
  mass: Density=240 Shell_Flag=0 Mass_Area=0.28 Mass_Prior=0
  Design: ChordTrimFlag=1 ChordTrimMax=1 ChordTrimMin=0.35 Offset=0 UTrimFlag=1 UTrimMax=0.9999 UTrimMin=0.998332 V1TrimBegin=0.826391 V1TrimEnd=0.173609 V1TrimFlag=1 V2TrimBegin=0.5 V2TrimEnd=0.5 V2TrimFlag=1

Conformal "nervura_2", child of "EmpHorizontal"
  location (X Y Z) 1.35 0 0.08, rotation 0 0 0; relative location 0 0 0, rotation 0 0 0
  symmetric about XZ
  bounding box size 0.130129 0.155294 0.0206708
  mass: Density=240 Shell_Flag=0 Mass_Area=0.28 Mass_Prior=0
  Design: ChordTrimFlag=1 ChordTrimMax=1 ChordTrimMin=0.35 Offset=0 UTrimFlag=1 UTrimMax=0.415 UTrimMin=0.411311 V1TrimBegin=0.826391 V1TrimEnd=0.173609 V1TrimFlag=1 V2TrimBegin=0.5 V2TrimEnd=0.5 V2TrimFlag=1

Conformal "nervura_4", child of "EmpHorizontal"
  location (X Y Z) 1.35 0 0.08, rotation 0 0 0; relative location 0 0 0, rotation 0 0 0
  symmetric about XZ
  bounding box size 0.130129 0.275294 0.0206708
  mass: Density=240 Shell_Flag=0 Mass_Area=0.28 Mass_Prior=0
  Design: ChordTrimFlag=1 ChordTrimMax=1 ChordTrimMin=0.35 Offset=0 UTrimFlag=1 UTrimMax=0.5 UTrimMin=0.497333 V1TrimBegin=0.826391 V1TrimEnd=0.173609 V1TrimFlag=1 V2TrimBegin=0.5 V2TrimEnd=0.5 V2TrimFlag=1

Conformal "nervura_6", child of "EmpHorizontal"
  location (X Y Z) 1.35 0 0.08, rotation 0 0 0; relative location 0 0 0, rotation 0 0 0
  symmetric about XZ
  bounding box size 0.130129 0.395294 0.0206708
  mass: Density=240 Shell_Flag=0 Mass_Area=0.28 Mass_Prior=0
  Design: ChordTrimFlag=1 ChordTrimMax=1 ChordTrimMin=0.35 Offset=0 UTrimFlag=1 UTrimMax=0.585 UTrimMin=0.582771 V1TrimBegin=0.826391 V1TrimEnd=0.173609 V1TrimFlag=1 V2TrimBegin=0.5 V2TrimEnd=0.5 V2TrimFlag=1

Conformal "nervura_8_airfoil", child of "EmpHorizontal"
  location (X Y Z) 1.35 0 0.08, rotation 0 0 0; relative location 0 0 0, rotation 0 0 0
  symmetric about XZ
  bounding box size 0.130129 0.592918 0.0206708
  mass: Density=240 Shell_Flag=0 Mass_Area=0.28 Mass_Prior=0
  Design: ChordTrimFlag=1 ChordTrimMax=1 ChordTrimMin=0.35 Offset=0 UTrimFlag=1 UTrimMax=0.724983 UTrimMin=0.723112 V1TrimBegin=0.826391 V1TrimEnd=0.173609 V1TrimFlag=1 V2TrimBegin=0.5 V2TrimEnd=0.5 V2TrimFlag=1

Conformal "nervura_10_airfoil", child of "EmpHorizontal"
  location (X Y Z) 1.35 0 0.08, rotation 0 0 0; relative location 0 0 0, rotation 0 0 0
  symmetric about XZ
  bounding box size 0.130129 0.748165 0.0206708
  mass: Density=240 Shell_Flag=0 Mass_Area=0.28 Mass_Prior=0
  Design: ChordTrimFlag=1 ChordTrimMax=1 ChordTrimMin=0.35 Offset=0 UTrimFlag=1 UTrimMax=0.83495 UTrimMin=0.833237 V1TrimBegin=0.826391 V1TrimEnd=0.173609 V1TrimFlag=1 V2TrimBegin=0.5 V2TrimEnd=0.5 V2TrimFlag=1

Conformal "nervura_12_airfoil", child of "EmpHorizontal"
  location (X Y Z) 1.35 0 0.08, rotation 0 0 0; relative location 0 0 0, rotation 0 0 0
  symmetric about XZ
  bounding box size 0.130129 0.903412 0.0206708
  mass: Density=240 Shell_Flag=0 Mass_Area=0.28 Mass_Prior=0
  Design: ChordTrimFlag=1 ChordTrimMax=1 ChordTrimMin=0.35 Offset=0 UTrimFlag=1 UTrimMax=0.944917 UTrimMin=0.943308 V1TrimBegin=0.826391 V1TrimEnd=0.173609 V1TrimFlag=1 V2TrimBegin=0.5 V2TrimEnd=0.5 V2TrimFlag=1

Conformal "profundor", child of "EmpHorizontal"
  location (X Y Z) 1.35 0 0.08, rotation 0 0 0; relative location 0 0 0, rotation 0 0 0
  symmetric about XZ
  bounding box size 0.0701612 0.980894 0.0136143
  mass: Density=140 Shell_Flag=0 Mass_Area=0.28 Mass_Prior=0
  Design: ChordTrimFlag=1 ChordTrimMax=0.35 ChordTrimMin=0 Offset=0 UTrimFlag=1 UTrimMax=0.9998 UTrimMin=0 V1TrimBegin=1 V1TrimEnd=0 V1TrimFlag=1 V2TrimBegin=0.173609 V2TrimEnd=0.826391 V2TrimFlag=1

Conformal "placa_servo", child of "EmpHorizontal"
  location (X Y Z) 1.35 0 0.08, rotation 0 0 0; relative location 0 0 0, rotation 0 0 0
  symmetric about XZ
  bounding box size 0.0392893 0.0396 0.000700027
  mass: Density=240 Shell_Flag=0 Mass_Area=0.28 Mass_Prior=0
  Design: ChordTrimFlag=0 ChordTrimMax=0.6 ChordTrimMin=0.351 Offset=0 UTrimFlag=1 UTrimMax=0.33 UTrimMin=0 V1TrimBegin=0.4 V1TrimEnd=0.2 V1TrimFlag=1 V2TrimBegin=0.296524 V2TrimEnd=0.71 V2TrimFlag=1

Conformal "reforco_LE", child of "EmpHorizontal"
  location (X Y Z) 1.35 0 0.08, rotation 0 0 0; relative location 0 0 0, rotation 0 0 0
  symmetric about XZ
  bounding box size 0.020231 0.981035 0.0155963
  mass: Density=0 Shell_Flag=1 Mass_Area=0.14 Mass_Prior=0
  Design: ChordTrimFlag=1 ChordTrimMax=1 ChordTrimMin=0.9 Offset=0 UTrimFlag=1 UTrimMax=0.9999 UTrimMin=0 V1TrimBegin=0.556 V1TrimEnd=0.444 V1TrimFlag=1 V2TrimBegin=0.5 V2TrimEnd=0.5 V2TrimFlag=1

Conformal "servo", child of "EmpHorizontal"
  location (X Y Z) 1.35 0 0.08, rotation 0 0 0; relative location 0 0 0, rotation 0 0 0
  symmetric about XZ
  bounding box size 0.0188334 0.018 0.0183538
  mass: Density=1800 Shell_Flag=0 Mass_Area=0.28 Mass_Prior=0
  Design: ChordTrimFlag=0 ChordTrimMax=0.6 ChordTrimMin=0.351 Offset=0 UTrimFlag=1 UTrimMax=0.15 UTrimMin=0 V1TrimBegin=0.78 V1TrimEnd=0.22 V1TrimFlag=1 V2TrimBegin=0.265 V2TrimEnd=0.733739 V2TrimFlag=1

Wing "EmpVertical", child of "Fuselagem"
  location (X Y Z) 1.15 0 0.051875, rotation 90 0 0
  bounding box size 0.373205 0.0200116 0.308665
  mass: Density=0 Shell_Flag=1 Mass_Area=0.1 Mass_Prior=0
  totals: TotalSpan=0.3 TotalProjectedSpan=0.3 TotalChord=0.2 TotalArea=0.06 TotalAR=1.5 RelativeTwistFlag=1
  root: chord 0.2, twist 0, NACA 4-series Camber=0 CamberLoc=0.2 ThickChord=0.1
  sections:
    n  Span       Root_Chord  Tip_Chord  Area        Sweep  Sweep_Location  Dihedral  Twist  Twist_Location  tip airfoil
    1  0.0122302  0.2         0.2        0.00244604  30     0               0         0      0.25            as above
    2  0.143885   0.2         0.2        0.028777    30     1               0         0      0.25            as above
    3  0.143885   0.2         0.2        0.028777    30     1               0         0      0.25            as above

Conformal "Longarina", child of "EmpVertical"
  location (X Y Z) 1.15 0 0.051875, rotation 90 0 0; relative location 0 0 0, rotation 0 0 0
  bounding box size 0.197795 0.0200058 0.309119
  mass: Density=0 Shell_Flag=1 Mass_Area=5.28 Mass_Prior=0
  Design: ChordTrimFlag=1 ChordTrimMax=0.8 ChordTrimMin=0.7 Offset=0 UTrimFlag=0 UTrimMax=0.9999 UTrimMin=0 V1TrimBegin=0.654386 V1TrimEnd=0.345614 V1TrimFlag=1 V2TrimBegin=0.394713 V2TrimEnd=0.605287 V2TrimFlag=1

Conformal "nervura_raiz", child of "EmpVertical"
  location (X Y Z) 1.15 0 0.051875, rotation 90 0 0; relative location 0 0 0, rotation 0 0 0
  bounding box size 0.130186 0.0200116 0.000322878
  mass: Density=240 Shell_Flag=0 Mass_Area=0.28 Mass_Prior=0
  Design: ChordTrimFlag=1 ChordTrimMax=1 ChordTrimMin=0.35 Offset=0 UTrimFlag=1 UTrimMax=0.33 UTrimMin=0.3212 V1TrimBegin=0.826391 V1TrimEnd=0.173609 V1TrimFlag=1 V2TrimBegin=0.5 V2TrimEnd=0.5 V2TrimFlag=1

Conformal "nervura_kink", child of "EmpVertical"
  location (X Y Z) 1.15 0 0.051875, rotation 90 0 0; relative location 0 0 0, rotation 0 0 0
  bounding box size 0.130495 0.0200116 0.000856914
  mass: Density=240 Shell_Flag=0 Mass_Area=0.28 Mass_Prior=0
  Design: ChordTrimFlag=1 ChordTrimMax=1 ChordTrimMin=0.35 Offset=0 UTrimFlag=1 UTrimMax=0.67 UTrimMin=0.668015 V1TrimBegin=0.826391 V1TrimEnd=0.173609 V1TrimFlag=1 V2TrimBegin=0.5 V2TrimEnd=0.5 V2TrimFlag=1

Conformal "nervura_tip", child of "EmpVertical"
  location (X Y Z) 1.15 0 0.051875, rotation 90 0 0; relative location 0 0 0, rotation 0 0 0
  bounding box size 0.130391 0.0200116 0.000677038
  mass: Density=240 Shell_Flag=0 Mass_Area=0.28 Mass_Prior=0
  Design: ChordTrimFlag=1 ChordTrimMax=1 ChordTrimMin=0.35 Offset=0 UTrimFlag=1 UTrimMax=0.9999 UTrimMin=0.998332 V1TrimBegin=0.826391 V1TrimEnd=0.173609 V1TrimFlag=1 V2TrimBegin=0.5 V2TrimEnd=0.5 V2TrimFlag=1

Conformal "nervura_2", child of "EmpVertical"
  location (X Y Z) 1.15 0 0.051875, rotation 90 0 0; relative location 0 0 0, rotation 0 0 0
  bounding box size 0.130919 0.0200116 0.00159233
  mass: Density=240 Shell_Flag=0 Mass_Area=0.28 Mass_Prior=0
  Design: ChordTrimFlag=1 ChordTrimMax=1 ChordTrimMin=0.35 Offset=0 UTrimFlag=1 UTrimMax=0.415 UTrimMin=0.411311 V1TrimBegin=0.826391 V1TrimEnd=0.173609 V1TrimFlag=1 V2TrimBegin=0.5 V2TrimEnd=0.5 V2TrimFlag=1

Conformal "nervura_4", child of "EmpVertical"
  location (X Y Z) 1.15 0 0.051875, rotation 90 0 0; relative location 0 0 0, rotation 0 0 0
  bounding box size 0.130665 0.0200116 0.00115108
  mass: Density=240 Shell_Flag=0 Mass_Area=0.28 Mass_Prior=0
  Design: ChordTrimFlag=1 ChordTrimMax=1 ChordTrimMin=0.35 Offset=0 UTrimFlag=1 UTrimMax=0.5 UTrimMin=0.497333 V1TrimBegin=0.826391 V1TrimEnd=0.173609 V1TrimFlag=1 V2TrimBegin=0.5 V2TrimEnd=0.5 V2TrimFlag=1

Conformal "nervura_6", child of "EmpVertical"
  location (X Y Z) 1.15 0 0.051875, rotation 90 0 0; relative location 0 0 0, rotation 0 0 0
  bounding box size 0.130555 0.0200116 0.000961973
  mass: Density=240 Shell_Flag=0 Mass_Area=0.28 Mass_Prior=0
  Design: ChordTrimFlag=1 ChordTrimMax=1 ChordTrimMin=0.35 Offset=0 UTrimFlag=1 UTrimMax=0.585 UTrimMin=0.582771 V1TrimBegin=0.826391 V1TrimEnd=0.173609 V1TrimFlag=1 V2TrimBegin=0.5 V2TrimEnd=0.5 V2TrimFlag=1

Conformal "nervura_8_airfoil", child of "EmpVertical"
  location (X Y Z) 1.15 0 0.051875, rotation 90 0 0; relative location 0 0 0, rotation 0 0 0
  bounding box size 0.130466 0.0200116 0.000807593
  mass: Density=240 Shell_Flag=0 Mass_Area=0.28 Mass_Prior=0
  Design: ChordTrimFlag=1 ChordTrimMax=1 ChordTrimMin=0.35 Offset=0 UTrimFlag=1 UTrimMax=0.724983 UTrimMin=0.723112 V1TrimBegin=0.826391 V1TrimEnd=0.173609 V1TrimFlag=1 V2TrimBegin=0.5 V2TrimEnd=0.5 V2TrimFlag=1

Conformal "nervura_10_airfoil", child of "EmpVertical"
  location (X Y Z) 1.15 0 0.051875, rotation 90 0 0; relative location 0 0 0, rotation 0 0 0
  bounding box size 0.130427 0.0200116 0.000739303
  mass: Density=240 Shell_Flag=0 Mass_Area=0.28 Mass_Prior=0
  Design: ChordTrimFlag=1 ChordTrimMax=1 ChordTrimMin=0.35 Offset=0 UTrimFlag=1 UTrimMax=0.83495 UTrimMin=0.833237 V1TrimBegin=0.826391 V1TrimEnd=0.173609 V1TrimFlag=1 V2TrimBegin=0.5 V2TrimEnd=0.5 V2TrimFlag=1

Conformal "nervura_12_airfoil", child of "EmpVertical"
  location (X Y Z) 1.15 0 0.051875, rotation 90 0 0; relative location 0 0 0, rotation 0 0 0
  bounding box size 0.130401 0.0200116 0.00069426
  mass: Density=240 Shell_Flag=0 Mass_Area=0.28 Mass_Prior=0
  Design: ChordTrimFlag=1 ChordTrimMax=1 ChordTrimMin=0.35 Offset=0 UTrimFlag=1 UTrimMax=0.944917 UTrimMin=0.943308 V1TrimBegin=0.826391 V1TrimEnd=0.173609 V1TrimFlag=1 V2TrimBegin=0.5 V2TrimEnd=0.5 V2TrimFlag=1

Conformal "profundor", child of "EmpVertical"
  location (X Y Z) 1.15 0 0.051875, rotation 90 0 0; relative location 0 0 0, rotation 0 0 0
  bounding box size 0.243155 0.0136214 0.299914
  mass: Density=140 Shell_Flag=0 Mass_Area=0.28 Mass_Prior=0
  Design: ChordTrimFlag=1 ChordTrimMax=0.35 ChordTrimMin=0 Offset=0 UTrimFlag=1 UTrimMax=0.9998 UTrimMin=0 V1TrimBegin=1 V1TrimEnd=0 V1TrimFlag=1 V2TrimBegin=0.173609 V2TrimEnd=0.826391 V2TrimFlag=1

Conformal "placa_servo", child of "EmpVertical"
  location (X Y Z) 1.15 0 0.051875, rotation 90 0 0; relative location 0 0 0, rotation 0 0 0
  bounding box size 0.0462317 0.00206393 0.0121079
  mass: Density=240 Shell_Flag=0 Mass_Area=0.28 Mass_Prior=0
  Design: ChordTrimFlag=0 ChordTrimMax=0.6 ChordTrimMin=0.351 Offset=0 UTrimFlag=1 UTrimMax=0.33 UTrimMin=0 V1TrimBegin=0.4 V1TrimEnd=0.2 V1TrimFlag=1 V2TrimBegin=0.296524 V2TrimEnd=0.71 V2TrimFlag=1

Conformal "servo", child of "EmpVertical"
  location (X Y Z) 1.15 0 0.051875, rotation 90 0 0; relative location 0 0 0, rotation 0 0 0
  bounding box size 0.0219989 0.0183459 0.0055036
  mass: Density=1800 Shell_Flag=0 Mass_Area=0.28 Mass_Prior=0
  Design: ChordTrimFlag=0 ChordTrimMax=0.6 ChordTrimMin=0.351 Offset=0 UTrimFlag=1 UTrimMax=0.15 UTrimMin=0 V1TrimBegin=0.78 V1TrimEnd=0.22 V1TrimFlag=1 V2TrimBegin=0.265 V2TrimEnd=0.733739 V2TrimFlag=1

Conformal "reforco_LE", child of "EmpVertical"
  location (X Y Z) 1.15 0 0.051875, rotation 90 0 0; relative location 0 0 0, rotation 0 0 0
  bounding box size 0.19318 0.0156047 0.299957
  mass: Density=0 Shell_Flag=1 Mass_Area=0.14 Mass_Prior=0
  Design: ChordTrimFlag=1 ChordTrimMax=1 ChordTrimMin=0.9 Offset=0 UTrimFlag=1 UTrimMax=0.9999 UTrimMin=0 V1TrimBegin=0.556 V1TrimEnd=0.444 V1TrimFlag=1 V2TrimBegin=0.5 V2TrimEnd=0.5 V2TrimFlag=1

Conformal "Boom", child of "Fuselagem"
  location (X Y Z) -0.2 0 -0.075, rotation 0 0 0; relative location 0 0 0, rotation 0 0 0
  bounding box size 0.7 0.04 0.14
  mass: Density=0 Shell_Flag=1 Mass_Area=5.28 Mass_Prior=0
  Design: ChordTrimFlag=0 ChordTrimMax=0.9 ChordTrimMin=0.1 Offset=0 UTrimFlag=1 UTrimMax=0.9999 UTrimMin=0.75 V1TrimBegin=0.3 V1TrimEnd=1 V1TrimFlag=0 V2TrimBegin=0.75 V2TrimEnd=1 V2TrimFlag=0

Conformal "Suporte_motor", child of "Fuselagem"
  location (X Y Z) -0.2 0 -0.075, rotation 0 0 0; relative location 0 0 0, rotation 0 0 0
  bounding box size 1.01175e-06 0.0700004 0.1
  mass: Density=0 Shell_Flag=1 Mass_Area=2.64 Mass_Prior=0
  Design: ChordTrimFlag=0 ChordTrimMax=0.9 ChordTrimMin=0.1 Offset=0 UTrimFlag=1 UTrimMax=0.002 UTrimMin=0 V1TrimBegin=0.3 V1TrimEnd=1 V1TrimFlag=0 V2TrimBegin=0.75 V2TrimEnd=1 V2TrimFlag=0

Conformal "Corta_fogo", child of "Fuselagem"
  location (X Y Z) -0.2 0 -0.075, rotation 0 0 0; relative location 0 0 0, rotation 0 0 0
  bounding box size 1.31466e-07 0.15 0.15
  mass: Density=0 Shell_Flag=1 Mass_Area=2.64 Mass_Prior=0
  Design: ChordTrimFlag=0 ChordTrimMax=0.9 ChordTrimMin=0.1 Offset=0 UTrimFlag=1 UTrimMax=0.2508 UTrimMin=0.2498 V1TrimBegin=0.3 V1TrimEnd=1 V1TrimFlag=0 V2TrimBegin=0.75 V2TrimEnd=1 V2TrimFlag=0

Conformal "carga", child of "Fuselagem"
  location (X Y Z) -0.2 0 -0.085, rotation 0 0 0; relative location 0 0 -0.01, rotation 0 0 0
  bounding box size 0.267296 0.11 0.11
  mass: Density=7680 Shell_Flag=1 Mass_Area=2.64 Mass_Prior=0
  Design: ChordTrimFlag=0 ChordTrimMax=0.9 ChordTrimMin=0.1 Offset=0.02 UTrimFlag=1 UTrimMax=0.4 UTrimMin=0.28 V1TrimBegin=0.95 V1TrimEnd=0.99 V1TrimFlag=0 V2TrimBegin=0.45 V2TrimEnd=0.01 V2TrimFlag=0

Stack "Vareta_carbono_1", child of "Fuselagem"
  location (X Y Z) 0 -0.075 -0.15, rotation 0 0 -0.075; relative location 0.2 -0.075 -0.075, rotation 0 0 -0.075
  bounding box size 0.400203 0.155523 0.005
  mass: Density=1760 Shell_Flag=0 Mass_Area=1 Mass_Prior=0
  cross sections:
    n  XDelta  YDelta  ZDelta  shape
    0  0       0       0       circle Circle_Diameter=0.005
    1  0.4     0       0       as above
    2  0       0.15    0       as above
    3  -0.4    0       0       as above
    4  0       -0.15   0       as above

Stack "Vareta_carbono_2", child of "Fuselagem"
  location (X Y Z) 0 -0.075 0, rotation 0 0 0; relative location 0.2 -0.075 0.075, rotation 0 0 0
  bounding box size 0.4 0.155 0.005
  mass: Density=1760 Shell_Flag=0 Mass_Area=1 Mass_Prior=0
  cross sections:
    n  XDelta  YDelta  ZDelta  shape
    0  0       0       0       circle Circle_Diameter=0.005
    1  0.4     0       0       as above
    2  0       0.15    0       as above
    3  -0.4    0       0       as above
    4  0       -0.15   0       as above

Stack "Vareta_carbono_3", child of "Fuselagem"
  location (X Y Z) 0 -0.075 0, rotation 0 0 0; relative location 0.2 -0.075 0.075, rotation 0 0 0
  symmetric about XZ
  bounding box size 0.2 0.155 0.155
  mass: Density=1760 Shell_Flag=0 Mass_Area=1 Mass_Prior=0
  cross sections:
    n  XDelta  YDelta  ZDelta  shape
    0  0       0       0       circle Circle_Diameter=0.005
    1  -0.2    0.04    -0.025  as above
    2  0       0       -0.1    as above
    3  0.2     -0.04   -0.025  as above
    4  0       0       0.15    as above

Stack "Vareta_carbono_4", child of "Fuselagem"
  location (X Y Z) 0.4 -0.075 0, rotation 0 0 0; relative location 0.6 -0.075 0.075, rotation 0 0 0
  symmetric about XZ
  bounding box size 0.3 0.155 0.155
  mass: Density=1760 Shell_Flag=0 Mass_Area=1 Mass_Prior=0
  cross sections:
    n  XDelta  YDelta  ZDelta  shape
    0  0       0       0       circle Circle_Diameter=0.005
    1  0.3     0.055   0       as above
    2  0       0       -0.04   as above
    3  -0.3    -0.055  -0.11   as above
    4  0       0       0.15    as above

Stack "Vareta_carbono_5", child of "Fuselagem"
  location (X Y Z) -0.2 -0.035 -0.025, rotation 0 0 0; relative location 0 -0.035 0.05, rotation 0 0 0
  symmetric about XZ
  bounding box size 0.9 0.155 0.155
  mass: Density=1760 Shell_Flag=0 Mass_Area=1 Mass_Prior=0
  cross sections:
    n   XDelta    YDelta  ZDelta   shape
    0   0         0       0        circle Circle_Diameter=0.005
    1   0.1       -0.02   -0.1125  as above
    2   0         0       0.125    as above
    3   0.1       -0.02   -0.1375  as above
    4   0         0       0.15     as above
    5   0.133333  0       -0.15    as above
    6   0         0       0.15     as above
    7   0.133333  0       -0.15    as above
    8   0         0       0.15     as above
    9   0.133333  0       -0.15    as above
    10  0         0       0.15     as above
    11  0.15      0.0275  -0.095   as above
    12  0         0       0.095    as above
    13  0.15      0.0275  -0.04    as above

Wing "bequilha", child of "Fuselagem"
  location (X Y Z) -0.02 0 -0.075, rotation -90 0 0; relative location 0.18 0 0, rotation -90 0 0
  bounding box size 0.0239854 0.05 0.23122
  totals: TotalSpan=0.23122 TotalProjectedSpan=0.23122 TotalChord=0.007625 TotalArea=0.00184152 TotalAR=29.0317
  root: chord 0.01, twist 0, rounded rectangle RoundRectXSec_Radius=0.005 RoundedRect_Height=0.05 RoundedRect_Width=0.01
  sections:
    n  Span         Root_Chord  Tip_Chord  Area         Sweep  Sweep_Location  Dihedral  Twist  Twist_Location  tip airfoil
    1  0.035        0.01        0.009375   0.000339063  -4     0               0         0      0.25            rounded rectangle RoundRectXSec_Radius=0 RoundedRect_Height=0.05 RoundedRect_Width=0.009375
    2  0.005        0.009375    0.00875    4.53125e-05  -4     0               0         0      0.25            rounded rectangle RoundRectXSec_Radius=0 RoundedRect_Height=0.005 RoundedRect_Width=0.00875
    3  0.16         0.00875     0.0075     0.0013       -4     0               0         0      0.25            rounded rectangle RoundRectXSec_Radius=0 RoundedRect_Height=0.005 RoundedRect_Width=0.0075
    4  0.000839695  0.0075      0.005      5.24809e-06  0      0               0         0      0.25            rounded rectangle RoundRectXSec_Radius=0 RoundedRect_Height=0.005 RoundedRect_Width=0.005
    5  0.03038      0.005       0.005      0.0001519    0      0               0         0      0.25            as above

Wing "roda", child of "bequilha"
  location (X Y Z) -0.0611607 -0.006 -0.30622, rotation 0 0 0; relative location -0.0411607 -0.006 -0.23122, rotation 0 0 0
  bounding box size 0.06 0.012 0.06
  mass: Density=1000 Shell_Flag=0 Mass_Area=1 Mass_Prior=0
  totals: TotalSpan=0.012 TotalProjectedSpan=0.012 TotalChord=0.06 TotalArea=0.00072 TotalAR=0.2
  root: chord 0.06, twist 0, circle Circle_Diameter=0.06
  sections:
    n  Span   Root_Chord  Tip_Chord  Area     Sweep  Sweep_Location  Dihedral  Twist  Twist_Location  tip airfoil
    1  0.012  0.06        0.06       0.00072  0      0               0         0      0.25            as above

Parameter links (A drives B)
  WingGeom:XSec_1:Root_Chord -> WingGeom:XSec_2:Root_Chord Offset=0 LowerLimit=0.2 UpperLimit=0.5
  WingGeom:XSec_1:Root_Chord -> WingGeom:XSec_1:Tip_Chord Offset=0
  WingGeom:XSec_1:Span -> fixacao_asa:XForm:Y_Rel_Location Offset=-0.006
  WingGeom:XSec_1:Tip_Chord -> fixacao_asa:XForm:X_Rel_Location Offset=0 Scale=0.125
  fixacao_asa:XForm:X_Rel_Location -> fixacao_asa:XForm:Z_Rel_Location Offset=0 Scale=-0.6
  Fuselagem:XSec_1:RoundedRect_Height -> trem_pouso:XForm:Z_Location Offset=0 Scale=-0.5
  Fuselagem:XSec_1:RoundedRect_Height -> Fuselagem:XSec_2:RoundedRect_Height Offset=0
  Fuselagem:XSec_1:RoundedRect_Width -> Fuselagem:XSec_2:RoundedRect_Width Offset=0
  Fuselagem:XSec_1:RoundedRect_Width -> WingGeom:XSec_1:Span Offset=0 Scale=0.5
  Fuselagem:XSec_1:XDelta -> Vareta_carbono_1:XForm:X_Rel_Location Offset=0
  Fuselagem:XSec_1:RoundedRect_Width -> Vareta_carbono_1:XForm:Y_Rel_Location Offset=0 Scale=-0.5
  Fuselagem:XSec_1:RoundedRect_Width -> Vareta_carbono_1:XSec_4:YDelta Offset=0 Scale=-1
  Fuselagem:XSec_1:RoundedRect_Width -> Vareta_carbono_1:XSec_2:YDelta Offset=0
  Fuselagem:XSec_1:XDelta -> Vareta_carbono_2:XForm:X_Rel_Location Offset=0
  Fuselagem:XSec_1:RoundedRect_Width -> Vareta_carbono_2:XForm:Y_Rel_Location Offset=0 Scale=-0.5
  Fuselagem:XSec_1:RoundedRect_Width -> Vareta_carbono_2:XSec_4:YDelta Offset=0 Scale=-1
  Fuselagem:XSec_1:RoundedRect_Width -> Vareta_carbono_2:XSec_2:YDelta Offset=0
  Fuselagem:XSec_1:RoundedRect_Height -> Vareta_carbono_1:XForm:Z_Rel_Location Offset=0 Scale=-0.5
  Fuselagem:XSec_1:RoundedRect_Height -> Vareta_carbono_2:XForm:Z_Rel_Location Offset=0 Scale=0.5
  Fuselagem:XSec_2:XDelta -> Vareta_carbono_1:XSec_1:XDelta Offset=0
  Fuselagem:XSec_2:XDelta -> Vareta_carbono_1:XSec_3:XDelta Offset=0 Scale=-1
  Fuselagem:XSec_2:XDelta -> Vareta_carbono_2:XSec_1:XDelta Offset=0
  Fuselagem:XSec_2:XDelta -> Vareta_carbono_2:XSec_3:XDelta Offset=0 Scale=-1
  Fuselagem:XSec_1:XDelta -> Vareta_carbono_3:XForm:X_Rel_Location Offset=0
  Fuselagem:XSec_1:RoundedRect_Width -> Vareta_carbono_3:XForm:Y_Rel_Location Offset=0 Scale=-0.5
  Fuselagem:XSec_1:RoundedRect_Height -> Vareta_carbono_3:XForm:Z_Rel_Location Offset=0 Scale=0.5
  Fuselagem:XSec_1:XDelta -> Vareta_carbono_3:XSec_1:XDelta Offset=0 Scale=-1
  Fuselagem:XSec_1:XDelta -> Vareta_carbono_3:XSec_3:XDelta Offset=0
  Fuselagem:XSec_0:RoundedRect_Height -> Vareta_carbono_3:XSec_2:ZDelta Offset=0 Scale=-1
  Vareta_carbono_3:XSec_1:YDelta -> Vareta_carbono_3:XSec_3:YDelta Offset=0 Scale=-1
  Vareta_carbono_3:XSec_1:ZDelta -> Vareta_carbono_3:XSec_3:ZDelta Offset=0
  Fuselagem:XSec_3:XDelta -> Vareta_carbono_4:XSec_1:XDelta Offset=0
  Fuselagem:XSec_3:XDelta -> Vareta_carbono_4:XSec_3:XDelta Offset=0 Scale=-1
  Fuselagem:XSec_2:RoundedRect_Height -> Vareta_carbono_4:XSec_4:ZDelta Offset=0
  Fuselagem:XSec_3:RoundedRect_Height -> Vareta_carbono_4:XSec_2:ZDelta Offset=0 Scale=-1
  Vareta_carbono_4:XSec_1:YDelta -> Vareta_carbono_4:XSec_3:YDelta Offset=0 Scale=-1
  Vareta_carbono_1:XSec_0:Circle_Diameter -> Vareta_carbono_1:XSec_1:Circle_Diameter Offset=0
  Vareta_carbono_1:XSec_0:Circle_Diameter -> Vareta_carbono_1:XSec_2:Circle_Diameter Offset=0
  Vareta_carbono_1:XSec_0:Circle_Diameter -> Vareta_carbono_1:XSec_3:Circle_Diameter Offset=0
  Vareta_carbono_1:XSec_0:Circle_Diameter -> Vareta_carbono_1:XSec_4:Circle_Diameter Offset=0
  Vareta_carbono_1:XSec_0:Circle_Diameter -> Vareta_carbono_2:XSec_0:Circle_Diameter Offset=0
  Vareta_carbono_1:XSec_0:Circle_Diameter -> Vareta_carbono_2:XSec_1:Circle_Diameter Offset=0
  Vareta_carbono_1:XSec_0:Circle_Diameter -> Vareta_carbono_2:XSec_2:Circle_Diameter Offset=0
  Vareta_carbono_1:XSec_0:Circle_Diameter -> Vareta_carbono_2:XSec_3:Circle_Diameter Offset=0
  Vareta_carbono_1:XSec_0:Circle_Diameter -> Vareta_carbono_2:XSec_4:Circle_Diameter Offset=0
  Vareta_carbono_1:XSec_0:Circle_Diameter -> Vareta_carbono_3:XSec_0:Circle_Diameter Offset=0
  Vareta_carbono_1:XSec_0:Circle_Diameter -> Vareta_carbono_3:XSec_1:Circle_Diameter Offset=0
  Vareta_carbono_1:XSec_0:Circle_Diameter -> Vareta_carbono_3:XSec_2:Circle_Diameter Offset=0
  Vareta_carbono_1:XSec_0:Circle_Diameter -> Vareta_carbono_3:XSec_3:Circle_Diameter Offset=0
  Vareta_carbono_1:XSec_0:Circle_Diameter -> Vareta_carbono_3:XSec_4:Circle_Diameter Offset=0
  Vareta_carbono_1:XSec_0:Circle_Diameter -> Vareta_carbono_4:XSec_0:Circle_Diameter Offset=0
  Vareta_carbono_1:XSec_0:Circle_Diameter -> Vareta_carbono_4:XSec_1:Circle_Diameter Offset=0
  Vareta_carbono_1:XSec_0:Circle_Diameter -> Vareta_carbono_4:XSec_2:Circle_Diameter Offset=0
  Vareta_carbono_1:XSec_0:Circle_Diameter -> Vareta_carbono_4:XSec_3:Circle_Diameter Offset=0
  Vareta_carbono_1:XSec_0:Circle_Diameter -> Vareta_carbono_4:XSec_4:Circle_Diameter Offset=0
  trem_pouso:WingGeom:TotalProjectedSpan -> roda:XForm:Y_Rel_Location Offset=0.005 Scale=0.5
  Fuselagem:XSec_1:RoundedRect_Height -> Vareta_carbono_4:XForm:Z_Rel_Location Offset=0 Scale=0.5
  Fuselagem:XSec_1:RoundedRect_Width -> Vareta_carbono_4:XForm:Y_Rel_Location Offset=0 Scale=-0.5
  Fuselagem:XSec_1:XDelta -> Fuselagem:XForm:X_Rel_Location Offset=0 Scale=-1
  Fuselagem:XSec_1:RoundedRect_Height -> Fuselagem:XForm:Z_Rel_Location Offset=0 Scale=-0.5
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
Advanced link "Wing_ribs_design"
  input UtrimMax_raiz = nervura_raiz:Design:UTrimMax
  input UtrimMax_kink = nervura_kink:Design:UTrimMax
  input UtrimMax_tip = nervura_tip:Design:UTrimMax
  input span_sec1 = WingGeom:XSec_1:Span
  input span_sec2 = WingGeom:XSec_2:Span
  input span_sec3 = WingGeom:XSec_3:Span
  input fuselagem_sec0_height = Fuselagem:XSec_0:RoundedRect_Height
  input fuselagem_sec0_width = Fuselagem:XSec_0:RoundedRect_Width
  input fuselagem_sec1_height = Fuselagem:XSec_1:RoundedRect_Height
  input fuselagem_sec1_width = Fuselagem:XSec_1:RoundedRect_Width
  input fuselage_sec2_height = Fuselagem:XSec_2:RoundedRect_Height
  input fuselage_sec2_width = Fuselagem:XSec_2:RoundedRect_Width
  input fuselage_sec3_height = Fuselagem:XSec_3:RoundedRect_Height
  input fuselage_sec3_width = Fuselagem:XSec_3:RoundedRect_Width
  input diametro_vareta_carbono = Vareta_carbono_1:XSec_0:Circle_Diameter
  input trem_pouso_tot_span = trem_pouso:WingGeom:TotalProjectedSpan
  input trem_pouso_xsec3_span = trem_pouso:XSec_3:Span
  input Fus_Xsec1_Xdelta = Fuselagem:XSec_1:XDelta
  input Fus_Xsec2_Xdelta = Fuselagem:XSec_2:XDelta
  input fuselage_com0 = Fuselagem:XSec_0:XDelta
  input fuselage_com1 = Fuselagem:XSec_1:XDelta
  input fuselage_com2 = Fuselagem:XSec_2:XDelta
  input fuselage_com3 = Fuselagem:XSec_3:XDelta
  input fuselage_com4 = Fuselagem:XSec_4:XDelta
  input fuselage_Zcom0 = Fuselagem:XSec_0:ZDelta
  input fuselage_Zcom1 = Fuselagem:XSec_1:ZDelta
  input fuselage_Zcom2 = Fuselagem:XSec_2:ZDelta
  input fuselage_Zcom3 = Fuselagem:XSec_3:ZDelta
  input fuselage_Zcom4 = Fuselagem:XSec_4:ZDelta
  input empH_rootChord = EmpHorizontal:XSec_1:Root_Chord
  input empV_rootChord = EmpVertical:XSec_1:Root_Chord
  input bequilha_span = bequilha:XSec_3:Span
  input bequilha_sweep = bequilha:XSec_3:Sweep
  input wheel_diameter = roda:WingGeom:TotalChord
  input wheel_thickness = roda:WingGeom:TotalSpan
  output UtrimMin_raiz = nervura_raiz:Design:UTrimMin
  output UtrimMin_kink = nervura_kink:Design:UTrimMin
  output UtrimMin_tip = nervura_tip:Design:UTrimMin
  output UtrimMax_n1 = nervura_1:Design:UTrimMax
  output UtrimMax_n2 = nervura_2:Design:UTrimMax
  output UtrimMax_n3 = nervura_3:Design:UTrimMax
  output UtrimMax_n4 = nervura_4:Design:UTrimMax
  output UtrimMax_n5 = nervura_5:Design:UTrimMax
  output UtrimMax_n6 = nervura_6:Design:UTrimMax
  output UtrimMax_n7 = nervura_7:Design:UTrimMax
  output UtrimMax_n8 = nervura_8_airfoil:Design:UTrimMax
  output UtrimMax_n9 = nervura_9_airfoil:Design:UTrimMax
  output UtrimMax_n10 = nervura_10_airfoil:Design:UTrimMax
  output UtrimMax_n11 = nervura_11_airfoil:Design:UTrimMax
  output UtrimMax_n12 = nervura_12_airfoil:Design:UTrimMax
  output UtrimMin_n1 = nervura_1:Design:UTrimMin
  output UtrimMin_n2 = nervura_2:Design:UTrimMin
  output UtrimMin_n3 = nervura_3:Design:UTrimMin
  output UtrimMin_n4 = nervura_4:Design:UTrimMin
  output UtrimMin_n5 = nervura_5:Design:UTrimMin
  output UtrimMin_n6 = nervura_6:Design:UTrimMin
  output UtrimMin_n7 = nervura_7:Design:UTrimMin
  output UtrimMin_n8 = nervura_8_airfoil:Design:UTrimMin
  output UtrimMin_n9 = nervura_9_airfoil:Design:UTrimMin
  output UtrimMin_n10 = nervura_10_airfoil:Design:UTrimMin
  output UtrimMin_n11 = nervura_11_airfoil:Design:UTrimMin
  output UtrimMin_n12 = nervura_12_airfoil:Design:UTrimMin
  output UtrimMin_placa_servo = placa_servo:Design:UTrimMin
  output UtrimMax_placa_servo = placa_servo:Design:UTrimMax
  output UtrimMin_servo = servo:Design:UTrimMin
  output UtrimMax_servo = servo:Design:UTrimMax
  output Vareta3_Ydelta = Vareta_carbono_3:XSec_1:YDelta
  output Vareta3_Zdelta = Vareta_carbono_3:XSec_1:ZDelta
  output Vareta4_Ydelta = Vareta_carbono_4:XSec_1:YDelta
  output Vareta4_Zdelta = Vareta_carbono_4:XSec_3:ZDelta
  output fuselage_xsec3_Zdelta = Fuselagem:XSec_3:ZDelta
  output trem_pouso_Zrel_loc = trem_pouso:XForm:Z_Rel_Location
  output roda_Zrel_loc = roda:XForm:Z_Rel_Location
  output Vareta4_Xrel_loc = Vareta_carbono_4:XForm:X_Rel_Location
  output empH_Xrel_loc = EmpHorizontal:XForm:X_Rel_Location
  output empH_Zrel_loc = EmpHorizontal:XForm:Z_Rel_Location
  output empV_Xrel_loc = EmpVertical:XForm:X_Rel_Location
  output empV_Zrel_loc = EmpVertical:XForm:Z_Rel_Location
  output Vareta5_Xsec1_Xdelta = Vareta_carbono_5:XSec_1:XDelta
  output Vareta5_Xsec1_Ydelta = Vareta_carbono_5:XSec_1:YDelta
  output Vareta5_Xsec1_Zdelta = Vareta_carbono_5:XSec_1:ZDelta
  output Vareta5_Xsec2_Xdelta = Vareta_carbono_5:XSec_2:XDelta
  output Vareta5_Xsec2_Ydelta = Vareta_carbono_5:XSec_2:YDelta
  output Vareta5_Xsec2_Zdelta = Vareta_carbono_5:XSec_2:ZDelta
  output Vareta5_Xsec3_Xdelta = Vareta_carbono_5:XSec_3:XDelta
  output Vareta5_Xsec3_Ydelta = Vareta_carbono_5:XSec_3:YDelta
  output Vareta5_Xsec3_Zdelta = Vareta_carbono_5:XSec_3:ZDelta
  output Vareta5_Xsec4_Xdelta = Vareta_carbono_5:XSec_4:XDelta
  output Vareta5_Xsec4_Ydelta = Vareta_carbono_5:XSec_4:YDelta
  output Vareta5_Xsec4_Zdelta = Vareta_carbono_5:XSec_4:ZDelta
  output Vareta5_Xsec5_Xdelta = Vareta_carbono_5:XSec_5:XDelta
  output Vareta5_Xsec5_Ydelta = Vareta_carbono_5:XSec_5:YDelta
  output Vareta5_Xsec5_Zdelta = Vareta_carbono_5:XSec_5:ZDelta
  output Vareta5_Xsec6_Xdelta = Vareta_carbono_5:XSec_6:XDelta
  output Vareta5_Xsec6_Ydelta = Vareta_carbono_5:XSec_6:YDelta
  output Vareta5_Xsec6_Zdelta = Vareta_carbono_5:XSec_6:ZDelta
  output Vareta5_Xsec7_Xdelta = Vareta_carbono_5:XSec_7:XDelta
  output Vareta5_Xsec7_Ydelta = Vareta_carbono_5:XSec_7:YDelta
  output Vareta5_Xsec7_Zdelta = Vareta_carbono_5:XSec_7:ZDelta
  output Vareta5_Xsec8_Xdelta = Vareta_carbono_5:XSec_8:XDelta
  output Vareta5_Xsec8_Ydelta = Vareta_carbono_5:XSec_8:YDelta
  output Vareta5_Xsec8_Zdelta = Vareta_carbono_5:XSec_8:ZDelta
  output Vareta5_Xsec9_Xdelta = Vareta_carbono_5:XSec_9:XDelta
  output Vareta5_Xsec9_Ydelta = Vareta_carbono_5:XSec_9:YDelta
  output Vareta5_Xsec9_Zdelta = Vareta_carbono_5:XSec_9:ZDelta
  output Vareta5_Xsec10_Xdelta = Vareta_carbono_5:XSec_10:XDelta
  output Vareta5_Xsec10_Ydelta = Vareta_carbono_5:XSec_10:YDelta
  output Vareta5_Xsec10_Zdelta = Vareta_carbono_5:XSec_10:ZDelta
  output Vareta5_Xsec11_Xdelta = Vareta_carbono_5:XSec_11:XDelta
  output Vareta5_Xsec11_Ydelta = Vareta_carbono_5:XSec_11:YDelta
  output Vareta5_Xsec11_Zdelta = Vareta_carbono_5:XSec_11:ZDelta
  output Vareta5_Xsec12_Xdelta = Vareta_carbono_5:XSec_12:XDelta
  output Vareta5_Xsec12_Ydelta = Vareta_carbono_5:XSec_12:YDelta
  output Vareta5_Xsec12_Zdelta = Vareta_carbono_5:XSec_12:ZDelta
  output Vareta5_Xsec13_Xdelta = Vareta_carbono_5:XSec_13:XDelta
  output Vareta5_Xsec13_Ydelta = Vareta_carbono_5:XSec_13:YDelta
  output Vareta5_Xsec13_Zdelta = Vareta_carbono_5:XSec_13:ZDelta
  output wheel_Xloc = roda:XForm:X_Rel_Location
  output wheel_Yloc = roda:XForm:Y_Rel_Location
    double nerv_thick;
    double n_nerv_s1;
    double n_nerv_s2;

    nerv_thick = 0.002;
    n_nerv_s1  = 7;
    n_nerv_s2  = 5;

    UtrimMin_raiz = (span_sec1 - nerv_thick)*UtrimMax_raiz/span_sec1;

    UtrimMin_kink = (span_sec1 + span_sec2 - nerv_thick)*UtrimMax_kink/(span_sec1 + span_sec2);

    UtrimMin_tip = (span_sec1 + span_sec2 + span_sec3 - nerv_thick)*UtrimMax_tip/(span_sec1 + span_sec2 + span_sec3);

    UtrimMax_n1  = (1/(n_nerv_s1+1))*(UtrimMax_kink - UtrimMax_raiz) + UtrimMax_raiz;
    UtrimMax_n2  = (2/(n_nerv_s1+1))*(UtrimMax_kink - UtrimMax_raiz) + UtrimMax_raiz;
    UtrimMax_n3  = (3/(n_nerv_s1+1))*(UtrimMax_kink - UtrimMax_raiz) + UtrimMax_raiz;
    UtrimMax_n4  = (4/(n_nerv_s1+1))*(UtrimMax_kink - UtrimMax_raiz) + UtrimMax_raiz;
    UtrimMax_n5  = (5/(n_nerv_s1+1))*(UtrimMax_kink - UtrimMax_raiz) + UtrimMax_raiz;
    UtrimMax_n6  = (6/(n_nerv_s1+1))*(UtrimMax_kink - UtrimMax_raiz) + UtrimMax_raiz;
    UtrimMax_n7  = (7/(n_nerv_s1+1))*(UtrimMax_kink - UtrimMax_raiz) + UtrimMax_raiz;
    UtrimMax_n8  = (1/(n_nerv_s2+1))*(UtrimMax_tip - UtrimMax_kink) + UtrimMax_kink;
    UtrimMax_n9  = (2/(n_nerv_s2+1))*(UtrimMax_tip - UtrimMax_kink) + UtrimMax_kink;
    UtrimMax_n10 = (3/(n_nerv_s2+1))*(UtrimMax_tip - UtrimMax_kink) + UtrimMax_kink;
    UtrimMax_n11 = (4/(n_nerv_s2+1))*(UtrimMax_tip - UtrimMax_kink) + UtrimMax_kink;
    UtrimMax_n12 = (5/(n_nerv_s2+1))*(UtrimMax_tip - UtrimMax_kink) + UtrimMax_kink;

    UtrimMin_n1  = ((span_sec1 + span_sec2*1/(n_nerv_s1+1) - nerv_thick)*UtrimMax_n1)/(span_sec1 + span_sec2*1/(n_nerv_s1+1));
    UtrimMin_n2  = ((span_sec1 + span_sec2*2/(n_nerv_s1+1) - nerv_thick)*UtrimMax_n2)/(span_sec1 + span_sec2*2/(n_nerv_s1+1));
    UtrimMin_n3  = ((span_sec1 + span_sec2*3/(n_nerv_s1+1) - nerv_thick)*UtrimMax_n3)/(span_sec1 + span_sec2*3/(n_nerv_s1+1));
    UtrimMin_n4  = ((span_sec1 + span_sec2*4/(n_nerv_s1+1) - nerv_thick)*UtrimMax_n4)/(span_sec1 + span_sec2*4/(n_nerv_s1+1));
    UtrimMin_n5  = ((span_sec1 + span_sec2*5/(n_nerv_s1+1) - nerv_thick)*UtrimMax_n5)/(span_sec1 + span_sec2*5/(n_nerv_s1+1));
    UtrimMin_n6  = ((span_sec1 + span_sec2*6/(n_nerv_s1+1) - nerv_thick)*UtrimMax_n6)/(span_sec1 + span_sec2*6/(n_nerv_s1+1));
    UtrimMin_n7  = ((span_sec1 + span_sec2*7/(n_nerv_s1+1) - nerv_thick)*UtrimMax_n7)/(span_sec1 + span_sec2*7/(n_nerv_s1+1));

    UtrimMin_n8   = ((span_sec1 + span_sec2 + span_sec3*1/(n_nerv_s2+1) - nerv_thick)*UtrimMax_n8)/(span_sec1 + span_sec2 + span_sec3*1/(n_nerv_s2+1));
    UtrimMin_n9   = ((span_sec1 + span_sec2 + span_sec3*2/(n_nerv_s2+1) - nerv_thick)*UtrimMax_n9)/(span_sec1 + span_sec2 + span_sec3*2/(n_nerv_s2+1));
    UtrimMin_n10  = ((span_sec1 + span_sec2 + span_sec3*3/(n_nerv_s2+1) - nerv_thick)*UtrimMax_n10)/(span_sec1 + span_sec2 + span_sec3*3/(n_nerv_s2+1));
    UtrimMin_n11  = ((span_sec1 + span_sec2 + span_sec3*4/(n_nerv_s2+1) - nerv_thick)*UtrimMax_n11)/(span_sec1 + span_sec2 + span_sec3*4/(n_nerv_s2+1));
    UtrimMin_n12  = ((span_sec1 + span_sec2 + span_sec3*5/(n_nerv_s2+1) - nerv_thick)*UtrimMax_n12)/(span_sec1 + span_sec2 + span_sec3*5/(n_nerv_s2+1));

    UtrimMin_placa_servo = UtrimMax_n9;
    UtrimMax_placa_servo = UtrimMin_n10;

    UtrimMin_servo = (UtrimMin_placa_servo + UtrimMax_placa_servo)/2 - 0.05/8;
    UtrimMax_servo = (UtrimMin_placa_servo + UtrimMax_placa_servo)/2 + 0.05/8;

    Vareta3_Ydelta = (fuselagem_sec1_width-fuselagem_sec0_width)/2;
    Vareta3_Zdelta = -(fuselagem_sec1_height-fuselagem_sec0_height)/2;

    Vareta4_Ydelta = (fuselage_sec2_width - fuselage_sec3_width)/2;
    Vareta4_Zdelta = -(fuselage_sec2_height - fuselage_sec3_height);

    fuselage_xsec3_Zdelta = 0.5*(fuselage_sec2_height - fuselage_sec3_height);

    trem_pouso_Zrel_loc = -(fuselagem_sec1_height+diametro_vareta_carbono)/2;

    roda_Zrel_loc = -((trem_pouso_tot_span-fuselagem_sec1_width)/2*sin(3.1415/2) + trem_pouso_xsec3_span/2);

    Vareta4_Xrel_loc = Fus_Xsec1_Xdelta + Fus_Xsec2_Xdelta;

    empH_Xrel_loc = fuselage_com2 + fuselage_com3 + fuselage_com4 - 0.25*empH_rootChord;
    empH_Zrel_loc = fuselage_Zcom1 + fuselage_Zcom2 + fuselage_Zcom3 + fuselage_Zcom4 - fuselagem_sec1_height*0.5;

    empV_Xrel_loc = fuselage_com2 + fuselage_com3 + fuselage_com4 - 0.25*empH_rootChord - empV_rootChord;
    empV_Zrel_loc = fuselage_Zcom1 + fuselage_Zcom2 + fuselage_Zcom3 + fuselage_Zcom4 - (0.25*empH_rootChord+empV_rootChord)*(fuselage_Zcom4-fuselage_Zcom3)/(fuselage_com4-fuselage_com3) - fuselagem_sec1_height*0.5;

    Vareta5_Xsec1_Xdelta = fuselage_com1/2;
    Vareta5_Xsec1_Ydelta = -(fuselagem_sec1_width-fuselagem_sec0_width)/4;
    Vareta5_Xsec1_Zdelta = -(fuselagem_sec0_height + (fuselagem_sec1_height-fuselagem_sec0_height)/4);

    Vareta5_Xsec2_Xdelta = 0.0;
    Vareta5_Xsec2_Ydelta = 0.0;
    Vareta5_Xsec2_Zdelta = (fuselagem_sec1_height+fuselagem_sec0_height)/2;

    Vareta5_Xsec3_Xdelta = fuselage_com1/2;
    Vareta5_Xsec3_Ydelta = -(fuselagem_sec1_width-fuselagem_sec0_width)/4;
    Vareta5_Xsec3_Zdelta = -((fuselagem_sec1_height+fuselagem_sec0_height)/2 +(fuselagem_sec1_height-fuselagem_sec0_height)/4);

    Vareta5_Xsec4_Xdelta = 0.0;
    Vareta5_Xsec4_Ydelta = 0.0;
    Vareta5_Xsec4_Zdelta = fuselagem_sec1_height;

    Vareta5_Xsec5_Xdelta = fuselage_com2/3;
    Vareta5_Xsec5_Ydelta = 0.0;
    Vareta5_Xsec5_Zdelta = -fuselagem_sec1_height;

    Vareta5_Xsec6_Xdelta = 0.0;
    Vareta5_Xsec6_Ydelta = 0.0;
    Vareta5_Xsec6_Zdelta = fuselagem_sec1_height;

    Vareta5_Xsec7_Xdelta = fuselage_com2/3;
    Vareta5_Xsec7_Ydelta = 0.0;
    Vareta5_Xsec7_Zdelta = -fuselagem_sec1_height;

    Vareta5_Xsec8_Xdelta = 0.0;
    Vareta5_Xsec8_Ydelta = 0.0;
    Vareta5_Xsec8_Zdelta = fuselagem_sec1_height;

    Vareta5_Xsec9_Xdelta = fuselage_com2/3;
    Vareta5_Xsec9_Ydelta = 0.0;
    Vareta5_Xsec9_Zdelta = -fuselagem_sec1_height;

    Vareta5_Xsec10_Xdelta = 0.0;
    Vareta5_Xsec10_Ydelta = 0.0;
    Vareta5_Xsec10_Zdelta = fuselagem_sec1_height;

    Vareta5_Xsec11_Xdelta = fuselage_com3/2;
    Vareta5_Xsec11_Ydelta = (fuselage_sec2_width-fuselage_sec3_width)/4;
    Vareta5_Xsec11_Zdelta = -(fuselage_sec2_height - (fuselage_sec2_height-fuselage_sec3_height)/2);

    Vareta5_Xsec12_Xdelta = 0.0;
    Vareta5_Xsec12_Ydelta = 0.0;
    Vareta5_Xsec12_Zdelta = (fuselage_sec2_height - (fuselage_sec2_height-fuselage_sec3_height)/2);

    Vareta5_Xsec13_Xdelta = fuselage_com3/2;
    Vareta5_Xsec13_Ydelta = (fuselage_sec2_width-fuselage_sec3_width)/4;
    Vareta5_Xsec13_Zdelta = -fuselage_sec3_height;

    wheel_Xloc = -wheel_diameter/2 + bequilha_span*sin(bequilha_sweep*3.1415/180);
    wheel_Yloc = -wheel_thickness/2;

Advanced link "Unnamed_Link"
