OpenVSP model (file version 5), 3 components.
Geometry view with OpenVSP parameter names; values to 6 digits, angles in degrees, lengths in the model's unit.
Overall bounding box: X_Min=-9.18033 X_Len=24.7143 Y_Min=-9 Y_Len=18 Z_Min=-1.32797 Z_Len=2.94787

Wing "WingGeom"
  location (X Y Z) 0 0 0, rotation 0 0 0
  symmetric about XZ
  bounding box size 4 18 0.480217
  totals: TotalSpan=18 TotalProjectedSpan=18 TotalChord=3.17857 TotalArea=57.2143 TotalAR=5.66292 MAC=3.24933
  root: chord 4, twist 0, NACA 4-series Camber=0 CamberLoc=0.2 ThickChord=0.12
  sections:
    n  Span  Root_Chord  Tip_Chord  Area     Sweep    Sweep_Location  Dihedral  Twist  Twist_Location  tip airfoil
    1  9     4           2.35714    28.6071  5.89286  0.4             0         0      0.25            NACA 4-series Camber=0 CamberLoc=0.2 ThickChord=0.1

Fuselage "FuselageGeom", child of "WingGeom"
  location (X Y Z) -9.18033 0 0, rotation -0.0819672 0 0
  bounding box size 24.7143 2.76157 2.65595
  Design: Length=24.7143
  cross sections:
    n  XLocPercent  YLocPercent  ZLocPercent  shape
    0  0            0            0            rounded rectangle RoundRectXSec_Radius=0 RoundedRect_Height=0.467147 RoundedRect_Width=0.50745
    1  0.25         0            0            rounded rectangle RoundRectXSec_Radius=0.2 RoundedRect_Height=0.704706 RoundedRect_Width=0.664019
    2  0.5          0            0            rounded rectangle RoundRectXSec_Radius=0.2 RoundedRect_Height=1.03702 RoundedRect_Width=0.895606
    3  0.75         0            0            rounded rectangle RoundRectXSec_Radius=0.2 RoundedRect_Height=0.923288 RoundedRect_Width=0.784795
    4  1            0            0            rounded rectangle RoundRectXSec_Radius=0.2 RoundedRect_Height=0.408163 RoundedRect_Width=0.571429

Wing "WingGeom", child of "WingGeom"
  location (X Y Z) 9.36475 0 0, rotation 30.666 0 0
  symmetric about XZ
  bounding box size 4 5.08737 1.79203
  totals: TotalSpan=5.67717 TotalProjectedSpan=5.67717 TotalChord=2.5 TotalArea=14.1929 TotalAR=2.27087 MAC=2.8
  root: chord 4, twist 0, NACA 4-series Camber=0 CamberLoc=0.2 ThickChord=0.1
  sections:
    n  Span     Root_Chord  Tip_Chord  Area     Sweep  Sweep_Location  Dihedral  Twist  Twist_Location  tip airfoil
    1  2.83858  4           1          7.09646  34.75  0.335714        0         0      0.25            as above
